// SBML level 2 version 4

model cs_model2()
  // cs_model2

  // Compartments:
  compartment Plasma = 1 MWBUILTINUNIT_liter;

  // Species:
  species CoV2S in Plasma = 1.94285e-9;  // substance in MWDERIVEDUNIT_molarity_liter
  species lgG in Plasma = 4.65;  // substance in MWDERIVEDUNIT_molarity_liter
  species CoV2S_lgG in Plasma = 0; CoV2S_lgG is "CoV2S:lgG";  // substance in MWDERIVEDUNIT_molarity_liter
  species C1q in Plasma = 6.006528;  // substance in MWDERIVEDUNIT_molarity_liter
  species C2 in Plasma = 6.169683;  // substance in MWDERIVEDUNIT_molarity_liter
  species C1INH in Plasma = 4.71138401;  // substance in MWDERIVEDUNIT_molarity_liter
  species MBL in Plasma = 8.665749;  // substance in MWDERIVEDUNIT_molarity_liter
  species C4 in Plasma = 7.169683;  // substance in MWDERIVEDUNIT_molarity_liter
  species C2a in Plasma = 0;  // substance in MWDERIVEDUNIT_molarity_liter
  species C4b in Plasma = 5.48494;  // substance in MWDERIVEDUNIT_molarity_liter
  species C4b_C2a in Plasma = 0; C4b_C2a is "C4b:C2a";  // substance in MWDERIVEDUNIT_molarity_liter
  species C4BP in Plasma = 3.61853;  // substance in MWDERIVEDUNIT_molarity_liter
  species C3 in Plasma = 5.205237;  // substance in MWDERIVEDUNIT_molarity_liter
  species MASP1 in Plasma = 4.760727;  // substance in MWDERIVEDUNIT_molarity_liter
  species MBL_MASP1 in Plasma = 0; MBL_MASP1 is "MBL:MASP1";  // substance in MWDERIVEDUNIT_molarity_liter
  species C3W in Plasma = 0;  // substance in MWDERIVEDUNIT_molarity_liter
  species C3W_Bb in Plasma = 0; C3W_Bb is "C3W:Bb";  // substance in MWDERIVEDUNIT_molarity_liter
  species FH in Plasma = 3.71195;  // substance in MWDERIVEDUNIT_molarity_liter
  species fC3b in Plasma = 0;  // substance in MWDERIVEDUNIT_molarity_liter
  species fC3b_Bb in Plasma = 0; fC3b_Bb is "fC3b:Bb";  // substance in MWDERIVEDUNIT_molarity_liter
  species FI in Plasma = 4.079502;  // substance in MWDERIVEDUNIT_molarity_liter
  species CR1 in Plasma = 9.94664775;  // substance in MWDERIVEDUNIT_molarity_liter
  species DAF in Plasma = 11.44266;  // substance in MWDERIVEDUNIT_molarity_liter
  species C3b in Plasma = 0;  // substance in MWDERIVEDUNIT_molarity_liter
  species fC3b_Bb_C3b in Plasma = 0; fC3b_Bb_C3b is "fC3b:Bb:C3b";  // substance in MWDERIVEDUNIT_molarity_liter
  species C4b_C2a_C3b in Plasma = 0; C4b_C2a_C3b is "C4b:C2a:C3b";  // substance in MWDERIVEDUNIT_molarity_liter
  species C2b in Plasma = 0;  // substance in MWDERIVEDUNIT_molarity_liter
  species C4a in Plasma = 5.48494;  // substance in MWDERIVEDUNIT_molarity_liter
  species C4b_C4BP in Plasma = 0; C4b_C4BP is "C4b:C4BP";  // substance in MWDERIVEDUNIT_molarity_liter
  species C4b_C2a_C4BP in Plasma = 0; C4b_C2a_C4BP is "C4b:C2a:C4BP";  // substance in MWDERIVEDUNIT_molarity_liter
  species C3a in Plasma = 0;  // substance in MWDERIVEDUNIT_molarity_liter
  species fC3b_Bb_CR1 in Plasma = 0; fC3b_Bb_CR1 is "fC3b:Bb:CR1";  // substance in MWDERIVEDUNIT_molarity_liter
  species fC3b_Bb_DAF in Plasma = 0; fC3b_Bb_DAF is "fC3b:Bb:DAF";  // substance in MWDERIVEDUNIT_molarity_liter
  species C4b_C2a_CR1 in Plasma = 0; C4b_C2a_CR1 is "C4b:C2a:CR1";  // substance in MWDERIVEDUNIT_molarity_liter
  species C4b_C2a_DAF in Plasma = 0; C4b_C2a_DAF is "C4b:C2a:DAF";  // substance in MWDERIVEDUNIT_molarity_liter
  species fC3b_Bb_FH in Plasma = 0; fC3b_Bb_FH is "fC3b:Bb:FH";  // substance in MWDERIVEDUNIT_molarity_liter
  species fC3b_Bb_C3b_CR1 in Plasma = 0; fC3b_Bb_C3b_CR1 is "fC3b:Bb:C3b:CR1";  // substance in MWDERIVEDUNIT_molarity_liter
  species fC3b_Bb_C3b_DAF in Plasma = 0; fC3b_Bb_C3b_DAF is "fC3b:Bb:C3b:DAF";  // substance in MWDERIVEDUNIT_molarity_liter
  species fC3b_Bb_C3b_FH in Plasma = 0; fC3b_Bb_C3b_FH is "fC3b:Bb:C3b:FH";  // substance in MWDERIVEDUNIT_molarity_liter
  species C4b_C2a_C3b_CR1 in Plasma = 0; C4b_C2a_C3b_CR1 is "C4b:C2a:C3b:CR1";  // substance in MWDERIVEDUNIT_molarity_liter
  species C4b_C2a_C3b_DAF in Plasma = 0; C4b_C2a_C3b_DAF is "C4b:C2a:C3b:DAF";  // substance in MWDERIVEDUNIT_molarity_liter
  species FB in Plasma = 2.768329;  // substance in MWDERIVEDUNIT_molarity_liter
  species C3W_FB in Plasma = 0; C3W_FB is "C3W:FB";  // substance in MWDERIVEDUNIT_molarity_liter
  species FD in Plasma = 0;  // substance in MWDERIVEDUNIT_molarity_liter
  species fC3b_FB in Plasma = 0; fC3b_FB is "fC3b:FB";  // substance in MWDERIVEDUNIT_molarity_liter
  species fC3b_FH in Plasma = 0; fC3b_FH is "fC3b:FH";  // substance in MWDERIVEDUNIT_molarity_liter
  species C3b_FH in Plasma = 0; C3b_FH is "C3b:FH";  // substance in MWDERIVEDUNIT_molarity_liter
  species C3b_CR1 in Plasma = 0; C3b_CR1 is "C3b:CR1";  // substance in MWDERIVEDUNIT_molarity_liter
  species C3W_FH in Plasma = 0; C3W_FH is "C3W:FH";  // substance in MWDERIVEDUNIT_molarity_liter
  species C3aR1 in Plasma = 7.705047;  // substance in MWDERIVEDUNIT_molarity_liter
  species C3a_C3aR1 in Plasma = 0; C3a_C3aR1 is "C3a:C3aR1";  // substance in MWDERIVEDUNIT_molarity_liter
  species C5 in Plasma = 3.85969341;  // substance in MWDERIVEDUNIT_molarity_liter
  species C5b in Plasma = 0;  // substance in MWDERIVEDUNIT_molarity_liter
  species C5a in Plasma = 0;  // substance in MWDERIVEDUNIT_molarity_liter
  species C6 in Plasma = 4.003036;  // substance in MWDERIVEDUNIT_molarity_liter
  species C5b_C6 in Plasma = 0; C5b_C6 is "C5b:C6";  // substance in MWDERIVEDUNIT_molarity_liter
  species C7 in Plasma = 3.22832;  // substance in MWDERIVEDUNIT_molarity_liter
  species C5b_C6_C7 in Plasma = 0; C5b_C6_C7 is "C5b:C6:C7";  // substance in MWDERIVEDUNIT_molarity_liter
  species C8 in Plasma = 4.09306;  // substance in MWDERIVEDUNIT_molarity_liter
  species C5b_C6_C7_C8 in Plasma = 0; C5b_C6_C7_C8 is "C5b:C6:C7:C8";  // substance in MWDERIVEDUNIT_molarity_liter
  species C9 in Plasma = 3.455719;  // substance in MWDERIVEDUNIT_molarity_liter
  species C5b_C6_C7_C8_C9 in Plasma = 0; C5b_C6_C7_C8_C9 is "C5b:C6:C7:C8:C9";  // substance in MWDERIVEDUNIT_molarity_liter
  species C5aR1 in Plasma = 10.16623;  // substance in MWDERIVEDUNIT_molarity_liter
  species C5a_C5aR1 in Plasma = 0; C5a_C5aR1 is "C5a:C5aR1";  // substance in MWDERIVEDUNIT_molarity_liter
  species lgG_fC3b in Plasma = 0; lgG_fC3b is "lgG:fC3b";  // substance in MWDERIVEDUNIT_molarity_liter
  species C4b_C2 in Plasma = 0; C4b_C2 is "C4b:C2";  // substance in MWDERIVEDUNIT_molarity_liter
  species P in Plasma = 7.061183;  // substance in MWDERIVEDUNIT_molarity_liter
  species C3b_P in Plasma = 0; C3b_P is "C3b:P";  // substance in MWDERIVEDUNIT_molarity_liter
  species fC3b_Bb_P in Plasma = 0; fC3b_Bb_P is "fC3b:Bb:P";  // substance in MWDERIVEDUNIT_molarity_liter
  species fC3b_Bb_C3b_P in Plasma = 0; fC3b_Bb_C3b_P is "fC3b:Bb:C3b:P";  // substance in MWDERIVEDUNIT_molarity_liter
  species fC3b_FB_P in Plasma = 0; fC3b_FB_P is "fC3b:FB:P";  // substance in MWDERIVEDUNIT_molarity_liter
  species C1r_C1s in Plasma = 0; C1r_C1s is "C1r:C1s";  // substance in MWDERIVEDUNIT_molarity_liter
  species C1q_C1r_C1s in Plasma = 0; C1q_C1r_C1s is "C1q:C1r:C1s";  // substance in MWDERIVEDUNIT_molarity_liter
  species C1 in Plasma = 0;  // substance in MWDERIVEDUNIT_molarity_liter
  species C3W_Bb_FH in Plasma = 0; C3W_Bb_FH is "C3W:Bb:FH";  // substance in MWDERIVEDUNIT_molarity_liter
  species Ba in Plasma = 0;  // substance in MWDERIVEDUNIT_molarity_liter
  species Bb in Plasma = 0;  // substance in MWDERIVEDUNIT_molarity_liter
  species lgG_fC3b_FB in Plasma = 0; lgG_fC3b_FB is "lgG:fC3b:FB";  // substance in MWDERIVEDUNIT_molarity_liter
  species lgG_fC3b_FB_P in Plasma = 0; lgG_fC3b_FB_P is "lgG:fC3b:FB:P";  // substance in MWDERIVEDUNIT_molarity_liter
  species W in Plasma = 1;  // substance in MWDERIVEDUNIT_molarity_liter
  species fC3b_CR1 in Plasma = 0; fC3b_CR1 is "fC3b:CR1";  // substance in MWDERIVEDUNIT_molarity_liter
  species C3b_FB in Plasma = 0; C3b_FB is "C3b:FB";  // substance in MWDERIVEDUNIT_molarity_liter
  species MASP2 in Plasma = 4.426791;  // substance in MWDERIVEDUNIT_molarity_liter
  species MBL_MASP2 in Plasma = 0; MBL_MASP2 is "MBL:MASP2";  // substance in MWDERIVEDUNIT_molarity_liter
  species C1INH_MASP2 in Plasma = 0; C1INH_MASP2 is "C1INH:MASP2";  // substance in MWDERIVEDUNIT_molarity_liter
  species C1INH_MASP1 in Plasma = 0; C1INH_MASP1 is "C1INH:MASP1";  // substance in MWDERIVEDUNIT_molarity_liter
  species fC3b_C4b in Plasma = 0; fC3b_C4b is "fC3b:C4b";  // substance in MWDERIVEDUNIT_molarity_liter
  species fC3b_C4b_FB in Plasma = 0; fC3b_C4b_FB is "fC3b:C4b:FB";  // substance in MWDERIVEDUNIT_molarity_liter
  species fC3b_C4b_FH in Plasma = 0; fC3b_C4b_FH is "fC3b:C4b:FH";  // substance in MWDERIVEDUNIT_molarity_liter
  species fC3b_C4b_CR1 in Plasma = 0; fC3b_C4b_CR1 is "fC3b:C4b:CR1";  // substance in MWDERIVEDUNIT_molarity_liter
  species fC3b_C4b_P in Plasma = 0; fC3b_C4b_P is "fC3b:C4b:P";  // substance in MWDERIVEDUNIT_molarity_liter
  species fC3b_C4b_C2 in Plasma = 0; fC3b_C4b_C2 is "fC3b:C4b:C2";  // substance in MWDERIVEDUNIT_molarity_liter
  species fC3b_C4b_P_FB in Plasma = 0; fC3b_C4b_P_FB is "fC3b:C4b:P:FB";  // substance in MWDERIVEDUNIT_molarity_liter
  species CoV2N in Plasma = 1.643096e-8;  // substance in MWDERIVEDUNIT_molarity_liter
  species IL6 in Plasma = 3.578358;  // substance in MWDERIVEDUNIT_molarity_liter
  species C1r in Plasma = 2.789566;  // substance in MWDERIVEDUNIT_molarity_liter
  species C1s in Plasma = 3.067418;  // substance in MWDERIVEDUNIT_molarity_liter
  species C1s_C4 in Plasma = 0; C1s_C4 is "C1s:C4";  // substance in MWDERIVEDUNIT_molarity_liter
  species MASP2_C4 in Plasma = 0; MASP2_C4 is "MASP2:C4";  // substance in MWDERIVEDUNIT_molarity_liter
  species fC3b_C3b_FB in Plasma = 0; fC3b_C3b_FB is "fC3b:C3b:FB";  // substance in MWDERIVEDUNIT_molarity_liter
  species F7 in Plasma = 5.956007;  // substance in MWDERIVEDUNIT_molarity_liter
  species F7a in Plasma = 0;  // substance in MWDERIVEDUNIT_molarity_liter
  species F9 in Plasma = 2.261296;  // substance in MWDERIVEDUNIT_molarity_liter
  species F9a in Plasma = 0;  // substance in MWDERIVEDUNIT_molarity_liter
  species F10 in Plasma = 5.684617;  // substance in MWDERIVEDUNIT_molarity_liter
  species F10a in Plasma = 0;  // substance in MWDERIVEDUNIT_molarity_liter
  species F8 in Plasma = 8.479165;  // substance in MWDERIVEDUNIT_molarity_liter
  species F8a in Plasma = 0;  // substance in MWDERIVEDUNIT_molarity_liter
  species F2a in Plasma = 0;  // substance in MWDERIVEDUNIT_molarity_liter
  species F5 in Plasma = 7.43315821;  // substance in MWDERIVEDUNIT_molarity_liter
  species F5a in Plasma = 0;  // substance in MWDERIVEDUNIT_molarity_liter
  species TF in Plasma = 4.979709;  // substance in MWDERIVEDUNIT_molarity_liter
  species F2 in Plasma = 5.153948;  // substance in MWDERIVEDUNIT_molarity_liter
  species Pn in Plasma = 0;  // substance in MWDERIVEDUNIT_molarity_liter
  species AT3 in Plasma = 2.803441;  // substance in MWDERIVEDUNIT_molarity_liter
  species F10a_AT3 in Plasma = 0; F10a_AT3 is "F10a:AT3";  // substance in MWDERIVEDUNIT_molarity_liter
  species F2a_AT3 in Plasma = 0; F2a_AT3 is "F2a:AT3";  // substance in MWDERIVEDUNIT_molarity_liter
  species F9a_AT3 in Plasma = 0; F9a_AT3 is "F9a:AT3";  // substance in MWDERIVEDUNIT_molarity_liter
  species TFPI in Plasma = 4.791216;  // substance in MWDERIVEDUNIT_molarity_liter
  species F10a_TFPI in Plasma = 0; F10a_TFPI is "F10a:TFPI";  // substance in MWDERIVEDUNIT_molarity_liter
  species A2M in Plasma = 4.553431;  // substance in MWDERIVEDUNIT_molarity_liter
  species F2a_A2M in Plasma = 0; F2a_A2M is "F2a:A2M";  // substance in MWDERIVEDUNIT_molarity_liter
  species TF_F7 in Plasma = 0; TF_F7 is "TF:F7";  // substance in MWDERIVEDUNIT_molarity_liter
  species TF_F7a in Plasma = 0; TF_F7a is "TF:F7a";  // substance in MWDERIVEDUNIT_molarity_liter
  species F10_F7a in Plasma = 0; F10_F7a is "F10:F7a";  // substance in MWDERIVEDUNIT_molarity_liter
  species F9_F7a in Plasma = 0; F9_F7a is "F9:F7a";  // substance in MWDERIVEDUNIT_molarity_liter
  species TF_F7a_F10a in Plasma = 0; TF_F7a_F10a is "TF:F7a:F10a";  // substance in MWDERIVEDUNIT_molarity_liter
  species F10a_F5a in Plasma = 0; F10a_F5a is "F10a:F5a";  // substance in MWDERIVEDUNIT_molarity_liter
  species F10a_F5a_F2 in Plasma = 0; F10a_F5a_F2 is "F10a:F5a:F2";  // substance in MWDERIVEDUNIT_molarity_liter
  species F9a_F10 in Plasma = 0; F9a_F10 is "F9a:F10";  // substance in MWDERIVEDUNIT_molarity_liter
  species F11_F2a in Plasma = 0; F11_F2a is "F11:F2a";  // substance in MWDERIVEDUNIT_molarity_liter
  species TF_F7a_F10 in Plasma = 0; TF_F7a_F10 is "TF:F7a:F10";  // substance in MWDERIVEDUNIT_molarity_liter
  species TF_F7a_F10a_TFPI in Plasma = 0; TF_F7a_F10a_TFPI is "TF:F7a:F10a:TFPI";  // substance in MWDERIVEDUNIT_molarity_liter
  species F10a_F8 in Plasma = 0; F10a_F8 is "F10a:F8";  // substance in MWDERIVEDUNIT_molarity_liter
  species F9a_F8a in Plasma = 0; F9a_F8a is "F9a:F8a";  // substance in MWDERIVEDUNIT_molarity_liter
  species F9a_F8a_F10 in Plasma = 0; F9a_F8a_F10 is "F9a:F8a:F10";  // substance in MWDERIVEDUNIT_molarity_liter
  species TF_F7a_AT3 in Plasma = 0; TF_F7a_AT3 is "TF:F7a:AT3";  // substance in MWDERIVEDUNIT_molarity_liter
  species TF_F7a_F9 in Plasma = 0; TF_F7a_F9 is "TF:F7a:F9";  // substance in MWDERIVEDUNIT_molarity_liter
  species F12 in Plasma = 5.956007;  // substance in MWDERIVEDUNIT_molarity_liter
  species F12a in Plasma = 0;  // substance in MWDERIVEDUNIT_molarity_liter
  species F12_F12a in Plasma = 0; F12_F12a is "F12:F12a";  // substance in MWDERIVEDUNIT_molarity_liter
  species F12a_AT3 in Plasma = 0; F12a_AT3 is "F12a:AT3";  // substance in MWDERIVEDUNIT_molarity_liter
  species F11 in Plasma = 4.121961;  // substance in MWDERIVEDUNIT_molarity_liter
  species F12a_F11 in Plasma = 0; F12a_F11 is "F12a:F11";  // substance in MWDERIVEDUNIT_molarity_liter
  species F11a in Plasma = 0;  // substance in MWDERIVEDUNIT_molarity_liter
  species F11a_F9 in Plasma = 0; F11a_F9 is "F11a:F9";  // substance in MWDERIVEDUNIT_molarity_liter
  species F11a_AT3 in Plasma = 0; F11a_AT3 is "F11a:AT3";  // substance in MWDERIVEDUNIT_molarity_liter
  species KAL in Plasma = 4.858593;  // substance in MWDERIVEDUNIT_molarity_liter
  species KAL_F12 in Plasma = 0; KAL_F12 is "KAL:F12";  // substance in MWDERIVEDUNIT_molarity_liter
  species F1a in Plasma = 0;  // substance in MWDERIVEDUNIT_molarity_liter
  species F1 in Plasma = 3.207278;  // substance in MWDERIVEDUNIT_molarity_liter
  species F2a_F1 in Plasma = 0; F2a_F1 is "F2a:F1";  // substance in MWDERIVEDUNIT_molarity_liter
  species gC1qR in Plasma = 1.38775e-7;  // substance in MWDERIVEDUNIT_molarity_liter
  species C1q_gC1qR in Plasma = 0; C1q_gC1qR is "C1q:gC1qR";  // substance in MWDERIVEDUNIT_molarity_liter
  species CoV2E in Plasma = 1e-12;  // substance in MWDERIVEDUNIT_molarity_liter
  species CoV2M in Plasma = 1e-12;  // substance in MWDERIVEDUNIT_molarity_liter
  species HK in Plasma = 2.733985;  // substance in MWDERIVEDUNIT_molarity_liter
  species P_KAL in Plasma = 3.289896; P_KAL is "P-KAL";  // substance in MWDERIVEDUNIT_molarity_liter
  species BK in Plasma = 3.046333;  // substance in MWDERIVEDUNIT_molarity_liter
  species B2R in Plasma = 4.155525;  // substance in MWDERIVEDUNIT_molarity_liter
  species BK_B2R in Plasma = 0; BK_B2R is "BK:B2R";  // substance in MWDERIVEDUNIT_molarity_liter
  species TAFIa in Plasma = 3.341702e-6;  // substance in MWDERIVEDUNIT_molarity_liter
  species TAFI in Plasma = 8.52e-7;  // substance in MWDERIVEDUNIT_molarity_liter
  species Glu_Pg in Plasma = 4.291519; Glu_Pg is "Glu-Pg";  // substance in MWDERIVEDUNIT_molarity_liter
  species tPA in Plasma = 6.859149;  // substance in MWDERIVEDUNIT_molarity_liter
  species Lys_Pg in Plasma = 5.291519; Lys_Pg is "Lys-Pg";  // substance in MWDERIVEDUNIT_molarity_liter
  species CD59 in Plasma = 7.6179;  // substance in MWDERIVEDUNIT_molarity_liter
  species P_KAL_F12a in Plasma = 0; P_KAL_F12a is "P-KAL:F12a";  // substance in MWDERIVEDUNIT_molarity_liter
  species PAI_1 in Plasma = 4.6111; PAI_1 is "PAI-1";  // substance in MWDERIVEDUNIT_molarity_liter
  species F1a_Lys_Pg in Plasma = 0; F1a_Lys_Pg is "F1a:Lys-Pg";  // substance in MWDERIVEDUNIT_molarity_liter
  species P_KAL_HK in Plasma = 0; P_KAL_HK is "P-KAL:HK";  // substance in MWDERIVEDUNIT_molarity_liter
  species gC1qR_F12 in Plasma = 0; gC1qR_F12 is "gC1qR:F12";  // substance in MWDERIVEDUNIT_molarity_liter
  species HK_F11 in Plasma = 0; HK_F11 is "HK:F11";  // substance in MWDERIVEDUNIT_molarity_liter
  species gC1qR_HK in Plasma = 0; gC1qR_HK is "gC1qR:HK";  // substance in MWDERIVEDUNIT_molarity_liter
  species PFD in Plasma = 6.59746;  // substance in MWDERIVEDUNIT_molarity_liter
  species FDPs in Plasma = 0;  // substance in MWDERIVEDUNIT_molarity_liter
  species Glu_Pg_FDPs in Plasma = 0; Glu_Pg_FDPs is "Glu-Pg:FDPs";  // substance in MWDERIVEDUNIT_molarity_liter
  species Lys_Pg_FDPs in Plasma = 0; Lys_Pg_FDPs is "Lys-Pg:FDPs";  // substance in MWDERIVEDUNIT_molarity_liter

  // Reactions:
  r17: CoV2S + lgG -> CoV2S_lgG; (k__CoV2SlgG_1*CoV2S*lgG - k__CoV2SlgG_2*CoV2S_lgG)*Plasma;
    k__CoV2SlgG_1 = 214000 MWDERIVEDUNIT_1__molarity_second; k__CoV2SlgG_2 = 0.017 MWDERIVEDUNIT_1__second;
  r6: C1INH + C1 => ; k__C1C1INH*C1INH*C1*Plasma;
    k__C1C1INH = 430000 MWDERIVEDUNIT_1__molarity_second;
  r14: C1INH + MASP2 => C1INH_MASP2; r14_k__C1INHMASP2*C1INH*MASP2*Plasma;
    r14_k__C1INHMASP2 = 22000000 MWDERIVEDUNIT_1__molarity_second;
  r35: C4 => C4a + C4b; (k_C1_catC4*C4*C1/(r35_k_C1_mC4*(1 + C4b_C2/r35_k_C1_mC2 + fC3b_C4b_C2/r35_k_C1_mC2 + C4/r35_k_C1_mC4)) + k_MASP1_catC4*MBL_MASP1*C4/(r35_k_MASP1_mC4*(1 + C4b_C2/r35_k_MASP1_mC2 + fC3b_C4b_C2/r35_k_MASP1_mC2 + C4/r35_k_MASP1_mC4)) + k_MASP2_catC4*MBL_MASP2*C4/(r35_k_MASP2_mC4*(1 + C4b_C2/r35_k_MASP2_mC2 + fC3b_C4b_C2/r35_k_MASP2_mC2 + C4/r35_k_MASP2_mC4)))*Plasma;
    k_C1_catC4 = 5.4 MWDERIVEDUNIT_1__second; r35_k_C1_mC4 = 6.1e-6 MWBUILTINUNIT_molarity; r35_k_C1_mC2 = 6.1e-6 MWBUILTINUNIT_molarity; k_MASP1_catC4 = 0.002 MWDERIVEDUNIT_1__second; r35_k_MASP1_mC4 = 5.2e-6 MWBUILTINUNIT_molarity; r35_k_MASP1_mC2 = 4.8e-6 MWBUILTINUNIT_molarity; k_MASP2_catC4 = 1.9 MWDERIVEDUNIT_1__second; r35_k_MASP2_mC4 = 8.5e-8 MWBUILTINUNIT_molarity; r35_k_MASP2_mC2 = 5.2e-6 MWBUILTINUNIT_molarity;
  r78: C2a + C4b -> C4b_C2a; k__C4bC2a_1*C2a*C4b*Plasma - k__C4bC2a_2*C4b_C2a*Plasma;
    k__C4bC2a_1 = 4400 MWDERIVEDUNIT_1__molarity_second; k__C4bC2a_2 = 0.0058 MWDERIVEDUNIT_1__second;
  r80: C4BP + C4b -> C4b_C4BP; k__C4bC4BP_1*C4BP*C4b*Plasma - k__C4bC4BP_2*C4b_C4BP*Plasma;
    k__C4bC4BP_1 = 200000 MWDERIVEDUNIT_1__molarity_second; k__C4bC4BP_2 = 0.016 MWDERIVEDUNIT_1__second;
  r70: W => fC3b; k__fC3b*fC3b*W*Plasma;
    k__fC3b = 420000000 MWDERIVEDUNIT_1__molarity_second;
  r8: MBL + MASP1 -> MBL_MASP1; k__MBLMASP1_1*MBL*MASP1*Plasma - k__MBLMASP1_2*MBL_MASP1*Plasma;
    k__MBLMASP1_1 = 210000 MWDERIVEDUNIT_1__molarity_second; k__MBLMASP1_2 = 0.00068 MWDERIVEDUNIT_1__second;
  r24: => C3W; r24_k__C3W*C3*Plasma;
    r24_k__C3W = 4.5e-6 MWDERIVEDUNIT_1__second;
  r36: FH + C3W -> C3W_FH; k__C3WFH_1*FH*C3W*Plasma - k__C3WFH_2*C3W_FH*Plasma;
    k__C3WFH_1 = 1100000 MWDERIVEDUNIT_1__molarity_second; k__C3WFH_2 = 0.06 MWDERIVEDUNIT_1__second;
  r94: fC3b_Bb => fC3b; r94_k__fC3bBb*fC3b_Bb*Plasma;
    r94_k__fC3bBb = 0.0077 MWDERIVEDUNIT_1__second;
  r83: FH + fC3b_Bb -> fC3b_Bb_FH; (k__fC3bBbFH_1*FH*fC3b_Bb - k__fC3bBbFH_2*fC3b_Bb_FH)*Plasma;
    k__fC3bBbFH_1 = 1100000 MWDERIVEDUNIT_1__molarity_second; k__fC3bBbFH_2 = 0.059 MWDERIVEDUNIT_1__second;
  r131: FI => CR1; (r131_k_FI_catfC3bCR1*fC3b_CR1*FI/(r131_k_FI_mfC3bCR1 + fC3b_CR1 + fC3b_FH + C3W_FH + fC3b_C4b_FH + fC3b_C4b_CR1 + C3b_FH + C3b_CR1) + r131_k_FI_catC3bCR1*C3b_CR1*FI/(r131_k_FI_mC3bCR1 + C3b_CR1 + fC3b_FH + fC3b_CR1 + C3W_FH + fC3b_C4b_FH + fC3b_C4b_CR1 + C3b_FH) + r131_k_FI_catfC3bC4bCR1*fC3b_C4b_CR1*FI/(r131_k_FI_mfC3bC4bCR1 + fC3b_C4b_CR1 + fC3b_FH + fC3b_CR1 + C3W_FH + fC3b_C4b_FH + C3b_FH + C3b_CR1))*Plasma;
    r131_k_FI_catC3bCR1 = 1.32 MWDERIVEDUNIT_1__second; r131_k_FI_mC3bCR1 = 2.52e-7 MWBUILTINUNIT_molarity; r131_k_FI_catfC3bCR1 = 1.32 MWDERIVEDUNIT_1__second; r131_k_FI_mfC3bCR1 = 2.52e-7 MWBUILTINUNIT_molarity; r131_k_FI_catfC3bC4bCR1 = 1.32 MWDERIVEDUNIT_1__second; r131_k_FI_mfC3bC4bCR1 = 2.52e-7 MWBUILTINUNIT_molarity;
  r105: CR1 + C4b_C2a -> C4b_C2a_CR1; k__C4bC2aCR1_1*CR1*C4b_C2a*Plasma - k__C4bC2aCR1_2*C4b_C2a_CR1*Plasma;
    k__C4bC2aCR1_1 = 3800000 MWDERIVEDUNIT_1__molarity_second; k__C4bC2aCR1_2 = 0.042 MWDERIVEDUNIT_1__second;
  r103: DAF + C4b_C2a -> C4b_C2a_DAF; (k__C4bC2aDAF_1*DAF*C4b_C2a - k__C4bC2aDAF_2*C4b_C2a_DAF)*Plasma;
    k__C4bC2aDAF_1 = 1400 MWDERIVEDUNIT_1__molarity_second; k__C4bC2aDAF_2 = 0.0012 MWDERIVEDUNIT_1__second;
  r65: FI => FH; (r65_k_FI_catfC3bFH*fC3b_FH*FI/(r65_k_FI_mfC3bFH + fC3b_FH + fC3b_CR1 + fC3b_C4b_FH + fC3b_C4b_CR1 + C3W_FH + C3b_FH + C3b_CR1) + r65_k_FI_catC3bFH*C3b_FH*FI/(r65_k_FI_mC3bFH + C3b_FH + fC3b_FH + C3W_FH + fC3b_CR1 + fC3b_C4b_FH + fC3b_C4b_CR1 + C3b_CR1) + r65_k_FI_catC3WFH*C3W_FH*FI/(r65_k_FI_mC3WFH + C3W_FH + fC3b_FH + fC3b_CR1 + fC3b_C4b_FH + fC3b_C4b_CR1 + C3b_FH + C3b_CR1) + r65_k_FI_catfC3bC4bFH*fC3b_C4b_FH*FI/(r65_k_FI_mfC3bC4bFH + fC3b_C4b_FH + C3W_FH + fC3b_FH + fC3b_CR1 + fC3b_C4b_CR1 + C3b_FH + C3b_CR1))*Plasma;
    r65_k_FI_catC3bFH = 1.32 MWDERIVEDUNIT_1__second; r65_k_FI_mC3bFH = 2.52e-7 MWBUILTINUNIT_molarity; r65_k_FI_catfC3bFH = 1.32 MWDERIVEDUNIT_1__second; r65_k_FI_mfC3bFH = 2.52e-7 MWBUILTINUNIT_molarity; r65_k_FI_catC3WFH = 1.32 MWDERIVEDUNIT_1__second; r65_k_FI_mC3WFH = 2.52e-7 MWBUILTINUNIT_molarity; r65_k_FI_catfC3bC4bFH = 1.32 MWDERIVEDUNIT_1__second; r65_k_FI_mfC3bC4bFH = 2.52e-7 MWBUILTINUNIT_molarity;
  r98: CR1 + fC3b_Bb -> fC3b_Bb_CR1; k__fC3bBbCR1_1*CR1*fC3b_Bb*Plasma - k__fC3bBbCR1_2*fC3b_Bb_CR1*Plasma;
    k__fC3bBbCR1_1 = 4400000 MWDERIVEDUNIT_1__molarity_second; k__fC3bBbCR1_2 = 0.057 MWDERIVEDUNIT_1__second;
  r119: DAF + fC3b_Bb -> fC3b_Bb_DAF; k__fC3bBbDAF_1*DAF*fC3b_Bb*Plasma - k__fC3bBbDAF_2*fC3b_Bb_DAF*Plasma;
    k__fC3bBbDAF_1 = 1400 MWDERIVEDUNIT_1__molarity_second; k__fC3bBbDAF_2 = 0.0012 MWDERIVEDUNIT_1__second;
  r122: C3 => C3b + C3a; (k_C3WBb_catC3*C3W_Bb*C3/(k_C3WBb_mC3 + C3) + k_C4bC2a_catC3*C4b_C2a*C3/(k_C4bC2a_mC3*(1 + C3/k_C4bC2a_mC3 + C5/k_C4bC2a_mC5)) + k_fC3bBb_catC3*(fC3b_Bb + fC3b_Bb_P)*C3/(r122_k_fC3bBb_mC3*(1 + C3/r122_k_fC3bBb_mC3 + C5/r122_k_fC3bBb_mC5)) + k_fC3bBb_catC3*fC3b_Bb_C3b*C3/(r122_k_fC3bBb_mC3*(1 + C3/r122_k_fC3bBb_mC3 + C5/r122_k_fC3bBbC3b_mC5)) + k_C4bC2a_catC3*C4b_C2a_C3b*C3/(k_C4bC2a_mC3*(1 + C3/k_C4bC2a_mC3 + C5/k_C4bC2aC3b_mC5)) + k_fC3bBb_catC3*fC3b_Bb_C3b_P*C3/(r122_k_fC3bBb_mC3*(1 + C3/r122_k_fC3bBb_mC3 + C5/r122_k_fC3bBbC3b_mC5)) + k_KAL_catC3*KAL*C3/(k_KAL_mC3 + C3) + k_Pn_catC3*Pn*C3/(k_Pn_mC3 + C3) + k_F2a_catC3*F2a*C3/(k_F2a_mC3 + C3) + k_F10a_catC3*F10a*C3/(k_F10a_mC3 + C3))*Plasma;
    k_C4bC2a_catC3 = 3.17 MWDERIVEDUNIT_1__second; k_C4bC2a_mC3 = 1.8e-6 MWBUILTINUNIT_molarity; k_fC3bBb_catC3 = 1.78 MWDERIVEDUNIT_1__second; r122_k_fC3bBb_mC3 = 5.86e-6 MWBUILTINUNIT_molarity; k_C3WBb_catC3 = 0.78 MWDERIVEDUNIT_1__second; k_C3WBb_mC3 = 1.16e-5 MWBUILTINUNIT_molarity; k_C4bC2a_mC5 = 8.9e-6 MWBUILTINUNIT_molarity; r122_k_fC3bBb_mC5 = 2.4e-5 MWBUILTINUNIT_molarity; r122_k_fC3bBbC3b_mC5 = 4.8e-8 MWBUILTINUNIT_molarity; k_C4bC2aC3b_mC5 = 5.1e-9 MWBUILTINUNIT_molarity; k_KAL_catC3 = 0.01 MWDERIVEDUNIT_1__second; k_KAL_mC3 = 1e-12 MWBUILTINUNIT_molarity; k_Pn_catC3 = 0.056 MWDERIVEDUNIT_1__second; k_Pn_mC3 = 2.4e-6 MWBUILTINUNIT_molarity; k_F2a_catC3 = 0.56 MWDERIVEDUNIT_1__second; k_F2a_mC3 = 2.4e-6 MWBUILTINUNIT_molarity; k_F10a_catC3 = 0.056 MWDERIVEDUNIT_1__second; k_F10a_mC3 = 2.4e-5 MWBUILTINUNIT_molarity;
  r97: C3b + fC3b_Bb -> fC3b_Bb_C3b; k__fC3bBbC3b_1*C3b*fC3b_Bb*Plasma - k__fC3bBbC3b_2*fC3b_Bb_C3b*Plasma;
    k__fC3bBbC3b_1 = 213000 MWDERIVEDUNIT_1__molarity_second; k__fC3bBbC3b_2 = 0.155 MWDERIVEDUNIT_1__second;
  r132: C3b + C4b_C2a -> C4b_C2a_C3b; k__C4bC2aC3b_1*C3b*C4b_C2a*Plasma - k__C4bC2aC3b_2*C4b_C2a_C3b*Plasma;
    k__C4bC2aC3b_1 = 15000000 MWDERIVEDUNIT_1__molarity_second; k__C4bC2aC3b_2 = 0.005 MWDERIVEDUNIT_1__second;
  r87: C4BP + C4b_C2a -> C4b_C2a_C4BP; k__C4bC2aC4BP_1*C4BP*C4b_C2a*Plasma - k__C4bC2aC4BP_2*C4b_C2a_C4BP*Plasma;
    k__C4bC2aC4BP_1 = 200000 MWDERIVEDUNIT_1__molarity_second; k__C4bC2aC4BP_2 = 0.016 MWDERIVEDUNIT_1__second;
  r113: CR1 + fC3b_Bb_C3b -> fC3b_Bb_C3b_CR1; k__fC3bBb3bCR1_1*CR1*fC3b_Bb_C3b*Plasma - k__fC3bBb3bCR1_2*fC3b_Bb_C3b_CR1*Plasma;
    k__fC3bBb3bCR1_1 = 98000 MWDERIVEDUNIT_1__molarity_second; k__fC3bBb3bCR1_2 = 0.0021 MWDERIVEDUNIT_1__second;
  r135: DAF + fC3b_Bb_C3b -> fC3b_Bb_C3b_DAF; k__fC3bBbC3bDAF_1*DAF*fC3b_Bb_C3b*Plasma - k__fC3bBbC3bDAF_2*fC3b_Bb_C3b_DAF*Plasma;
    k__fC3bBbC3bDAF_1 = 1400 MWDERIVEDUNIT_1__molarity_second; k__fC3bBbC3bDAF_2 = 0.0012 MWDERIVEDUNIT_1__second;
  r115: FH + fC3b_Bb_C3b -> fC3b_Bb_C3b_FH; k__fC3bBbC3bFH_1*FH*fC3b_Bb_C3b*Plasma - k__fC3bBbC3bFH_2*fC3b_Bb_C3b_FH*Plasma;
    k__fC3bBbC3bFH_1 = 1100000 MWDERIVEDUNIT_1__molarity_second; k__fC3bBbC3bFH_2 = 0.059 MWDERIVEDUNIT_1__second;
  r133: CR1 + C4b_C2a_C3b -> C4b_C2a_C3b_CR1; k__C4b2a3bCR1_1*CR1*C4b_C2a_C3b*Plasma - k__C4b2a3bCR1_2*C4b_C2a_C3b_CR1*Plasma;
    k__C4b2a3bCR1_1 = 98000 MWDERIVEDUNIT_1__molarity_second; k__C4b2a3bCR1_2 = 0.0021 MWDERIVEDUNIT_1__second;
  r145: DAF + C4b_C2a_C3b -> C4b_C2a_C3b_DAF; (k__C4bC2aC3bDAF_1*DAF*C4b_C2a_C3b - k__C4bC2aC3bDAF_2*C4b_C2a_C3b_DAF)*Plasma;
    k__C4bC2aC3bDAF_1 = 1400 MWDERIVEDUNIT_1__molarity_second; k__C4bC2aC3bDAF_2 = 0.0012 MWDERIVEDUNIT_1__second;
  r23: FB + C3W -> C3W_FB; k__C3WFB_1*FB*C3W*Plasma - k__C3WFB_2*C3W_FB*Plasma;
    k__C3WFB_1 = 11000 MWDERIVEDUNIT_1__molarity_second; k__C3WFB_2 = 0.0014 MWDERIVEDUNIT_1__second;
  r41: FB + fC3b -> fC3b_FB; k__fC3bFB_1*FB*fC3b*Plasma - k__fC3bFB_2*fC3b_FB*Plasma;
    k__fC3bFB_1 = 213000 MWDERIVEDUNIT_1__molarity_second; k__fC3bFB_2 = 0.155 MWDERIVEDUNIT_1__second;
  r37: FH + fC3b -> fC3b_FH; k__fC3bFH_1*FH*fC3b*Plasma - k__fC3bFH_2*fC3b_FH*Plasma;
    k__fC3bFH_1 = 1100000 MWDERIVEDUNIT_1__molarity_second; k__fC3bFH_2 = 0.059 MWDERIVEDUNIT_1__second;
  r42: fC3b_FB => fC3b_Bb + Ba; (k_FD_catfC3bFB*fC3b_FB*FD/(k_FD_mfC3bFB + fC3b_FB + fC3b_FB_P + C3W_FB + lgG_fC3b_FB + lgG_fC3b_FB_P + C3b_FB + fC3b_C4b_FB + fC3b_C4b_P_FB + fC3b_C3b_FB) + k_KAL_catfC3bFB*fC3b_FB*KAL/(k_KAL_mfC3bFB + fC3b_FB))*Plasma;
    k_FD_catfC3bFB = 1.32 MWDERIVEDUNIT_1__second; k_FD_mfC3bFB = 2.52e-7 MWBUILTINUNIT_molarity; k_KAL_catfC3bFB = 0.01 MWDERIVEDUNIT_1__second; k_KAL_mfC3bFB = 1e-12 MWBUILTINUNIT_molarity;
  r126: FH + C3b -> C3b_FH; k__C3bFH_1*FH*C3b*Plasma - k__C3bFH_2*C3b_FH*Plasma;
    k__C3bFH_1 = 1100000 MWDERIVEDUNIT_1__molarity_second; k__C3bFH_2 = 0.059 MWDERIVEDUNIT_1__second;
  r128: CR1 + C3b -> C3b_CR1; k__C3bCR1_1*CR1*C3b*Plasma - k__C3bCR1_2*C3b_CR1*Plasma;
    k__C3bCR1_1 = 4400000 MWDERIVEDUNIT_1__molarity_second; k__C3bCR1_2 = 0.057 MWDERIVEDUNIT_1__second;
  r39: FH + C3W_Bb -> C3W_Bb_FH; k__C3WBbFH_1*FH*C3W_Bb*Plasma - k__C3WBbFH_2*C3W_Bb_FH*Plasma;
    k__C3WBbFH_1 = 1100000 MWDERIVEDUNIT_1__molarity_second; k__C3WBbFH_2 = 0.059 MWDERIVEDUNIT_1__second;
  r138: C3a + C3aR1 -> C3a_C3aR1; k__C3aC3aR1_1*C3a*C3aR1*Plasma - k__C3aC3aR1_2*C3a_C3aR1*Plasma;
    k__C3aC3aR1_1 = 26000000 MWDERIVEDUNIT_1__molarity_second; k__C3aC3aR1_2 = 0.1 MWDERIVEDUNIT_1__second;
  r140: C5 => C5a + C5b; (k_fC3bBb_catC5*fC3b_Bb*C5/(r140_k_fC3bBb_mC5*(1 + C3/r140_k_fC3bBb_mC3 + C5/r140_k_fC3bBb_mC5)) + k_fC3bBb_catC5*fC3b_Bb_P*C5/(r140_k_fC3bBb_mC5*(1 + C3/r140_k_fC3bBb_mC3 + C5/r140_k_fC3bBb_mC5)) + k_C4b2a_catC5*C4b_C2a*C5/(k_C4b2a_mC5*(1 + C3/k_C4b2a_mC3 + C5/k_C4b2a_mC5)) + k_C4b2a3b_catC5*C4b_C2a_C3b*C5/(k_C4b2a3b_mC5*(1 + C3/k_C4b2a_mC3 + C5/k_C4b2a3b_mC5)) + k_fC3bBbC3b_catC5*(fC3b_Bb_C3b + fC3b_Bb_C3b_P)*C5/(r140_k_fC3bBbC3b_mC5*(1 + C3/r140_k_fC3bBb_mC3 + C5/r140_k_fC3bBbC3b_mC5)) + k_KAL_catC5*KAL*C5/(k_KAL_mC5 + C5) + k_Pn_catC5*Pn*C5/(k_Pn_mC5 + C5) + k_F2a_catC5*F2a*C5/(k_F2a_mC5 + C5) + k_F10a_catC5*F10a*C5/(k_F10a_mC5 + C5))*Plasma;
    k_C4b2a3b_catC5 = 0.02 MWDERIVEDUNIT_1__second; k_C4b2a3b_mC5 = 5.1e-9 MWBUILTINUNIT_molarity; k_fC3bBbC3b_catC5 = 0.003 MWDERIVEDUNIT_1__second; r140_k_fC3bBbC3b_mC5 = 4.8e-8 MWBUILTINUNIT_molarity; k_fC3bBb_catC5 = 0.011 MWDERIVEDUNIT_1__second; r140_k_fC3bBb_mC5 = 2.4e-6 MWBUILTINUNIT_molarity; k_C4b2a_catC5 = 0.022 MWDERIVEDUNIT_1__second; k_C4b2a_mC5 = 8.9e-6 MWBUILTINUNIT_molarity; r140_k_fC3bBb_mC3 = 5.86e-6 MWBUILTINUNIT_molarity; k_C4b2a_mC3 = 1.8e-6 MWBUILTINUNIT_molarity; k_KAL_catC5 = 0.01 MWDERIVEDUNIT_1__second; k_KAL_mC5 = 1e-12 MWBUILTINUNIT_molarity; k_Pn_catC5 = 0.056 MWDERIVEDUNIT_1__second; k_Pn_mC5 = 2.4e-6 MWBUILTINUNIT_molarity; k_F2a_catC5 = 0.56 MWDERIVEDUNIT_1__second; k_F2a_mC5 = 2.4e-6 MWBUILTINUNIT_molarity; k_F10a_catC5 = 0.056 MWDERIVEDUNIT_1__second; k_F10a_mC5 = 2.4e-5 MWBUILTINUNIT_molarity;
  r148: C5b + C6 -> C5b_C6; (k__C5bC6_1*C5b*C6 - k__C5bC6_2*C5b_C6)*Plasma;
    k__C5bC6_1 = 60000 MWDERIVEDUNIT_1__molarity_second; k__C5bC6_2 = 9e-8 MWDERIVEDUNIT_1__second;
  r151: C7 + C5b_C6 -> C5b_C6_C7; k__C5bC6C7_1*C7*C5b_C6*Plasma - k__C5bC6C7_2*C5b_C6_C7*Plasma;
    k__C5bC6C7_1 = 730000 MWDERIVEDUNIT_1__molarity_second; k__C5bC6C7_2 = 1.5e-7 MWDERIVEDUNIT_1__second;
  r154: C8 + C5b_C6_C7 -> C5b_C6_C7_C8; k__C5bC6C7C8*C8*C5b_C6_C7*Plasma - k_C5bC6C7C8*C5b_C6_C7_C8*Plasma;
    k__C5bC6C7C8 = 1100000 MWDERIVEDUNIT_1__molarity_second; k_C5bC6C7C8 = 9.8e-7 MWDERIVEDUNIT_1__second;
  r157: C9 + C5b_C6_C7_C8 -> C5b_C6_C7_C8_C9; k__C5bC6C7C8C9_1*C9*C5b_C6_C7_C8*Plasma - k__C5bC6C7C8C9_2*C5b_C6_C7_C8_C9*Plasma;
    k__C5bC6C7C8C9_1 = 2800000 MWDERIVEDUNIT_1__molarity_second; k__C5bC6C7C8C9_2 = 2.8e-6 MWDERIVEDUNIT_1__second;
  r144: C5a + C5aR1 -> C5a_C5aR1; k__C5aC5aR1_1*C5a*C5aR1*Plasma - k__C5aC5aR1_2*C5a_C5aR1*Plasma;
    k__C5aC5aR1_1 = 22000000 MWDERIVEDUNIT_1__molarity_second; k__C5aC5aR1_2 = 0.1 MWDERIVEDUNIT_1__second;
  r49: lgG + fC3b => lgG_fC3b; r49_k__lgGfC3b*lgG*fC3b*Plasma;
    r49_k__lgGfC3b = 420000000 MWDERIVEDUNIT_1__molarity_second;
  r73: C2 + C4b -> C4b_C2; k__C4bC2_1*C2*C4b*Plasma - k__C4bC2_2*C4b_C2*Plasma;
    k__C4bC2_1 = 1600000 MWDERIVEDUNIT_1__molarity_second; k__C4bC2_2 = 0.0042 MWDERIVEDUNIT_1__second;
  r130: P + C3b -> C3b_P; K__C3bP_1*P*C3b*Plasma - K__C3bP_2*C3b_P*Plasma;
    K__C3bP_1 = 150000 MWDERIVEDUNIT_1__molarity_second; K__C3bP_2 = 0.000155 MWDERIVEDUNIT_1__second;
  r99: P + fC3b_Bb -> fC3b_Bb_P; (k__fC3bBbP_1*P*fC3b_Bb - k__fC3bBbP_2*fC3b_Bb_P)*Plasma;
    k__fC3bBbP_1 = 0.000155 MWDERIVEDUNIT_1__molarity_second; k__fC3bBbP_2 = 150000 MWDERIVEDUNIT_1__second;
  r118: P + fC3b_Bb_C3b -> fC3b_Bb_C3b_P; k__fC3bBbC3bP_1*P*fC3b_Bb_C3b*Plasma - k__fC3bBbC3bP_2*fC3b_Bb_C3b_P*Plasma;
    k__fC3bBbC3bP_1 = 150000 MWDERIVEDUNIT_1__molarity_second; k__fC3bBbC3bP_2 = 0.000155 MWDERIVEDUNIT_1__second;
  r109: P + fC3b_FB -> fC3b_FB_P; k__fC3bFBP_1*P*fC3b_FB*Plasma - k__fC3bFBP_2*fC3b_FB_P*Plasma;
    k__fC3bFBP_1 = 150000 MWDERIVEDUNIT_1__molarity_second; k__fC3bFBP_2 = 0.000155 MWDERIVEDUNIT_1__second;
  r2: C1r_C1s + C1q -> C1q_C1r_C1s; k__C1qrs_1*C1r_C1s*C1q*Plasma - k__C1qrs_2*C1q_C1r_C1s*Plasma;
    k__C1qrs_1 = 820000 MWDERIVEDUNIT_1__molarity_second; k__C1qrs_2 = 0.0012 MWDERIVEDUNIT_1__second;
  r3: C1q_C1r_C1s => C1; k__C1*C1q_C1r_C1s*Plasma;
    k__C1 = 2.1e-5 MWDERIVEDUNIT_1__second;
  r26: C3W_FB => C3W_Bb + Ba; (r26_k_FD_catC3WFB*C3W_FB*FD/(r26_k_FD_mC3WFB + C3W_FB + fC3b_FB + fC3b_FB_P + lgG_fC3b_FB + lgG_fC3b_FB_P + C3b_FB + fC3b_C4b_FB + fC3b_C4b_P_FB + fC3b_C3b_FB) + k_KAL_catC3WFB*C3W_FB*KAL/(k_KAL_mC3WFB + C3W_FB))*Plasma;
    r26_k_FD_catC3WFB = 5 MWDERIVEDUNIT_1__second; r26_k_FD_mC3WFB = 2.5e-6 MWBUILTINUNIT_molarity; k_KAL_catC3WFB = 0.01 MWDERIVEDUNIT_1__second; k_KAL_mC3WFB = 1e-12 MWBUILTINUNIT_molarity;
  r120: fC3b_Bb_DAF => ; r120_k__dfC3bBbDAF*fC3b_Bb_DAF*Plasma;
    r120_k__dfC3bBbDAF = 0.017 MWDERIVEDUNIT_1__second;
  r108: fC3b_Bb_CR1 => ; r108_k__dfC3bBbCR1*fC3b_Bb_CR1*Plasma;
    r108_k__dfC3bBbCR1 = 0.017 MWDERIVEDUNIT_1__second;
  r116: fC3b_Bb_C3b_FH => ; r116_k__dfC3bBbC3bFH*fC3b_Bb_C3b_FH*Plasma;
    r116_k__dfC3bBbC3bFH = 0.017 MWDERIVEDUNIT_1__second;
  r114: fC3b_Bb_C3b_CR1 => ; r114_k__dfC3bBbC3bCR1*fC3b_Bb_C3b_CR1*Plasma;
    r114_k__dfC3bBbC3bCR1 = 0.017 MWDERIVEDUNIT_1__second;
  r146: C4b_C2a_C3b_DAF => ; k__dC4b2a3bDAF*C4b_C2a_C3b_DAF*Plasma;
    k__dC4b2a3bDAF = 0.017 MWDERIVEDUNIT_1__second;
  r136: fC3b_Bb_C3b_DAF => ; r136_k__dfC3bBbC3bDAF*fC3b_Bb_C3b_DAF*Plasma;
    r136_k__dfC3bBbC3bDAF = 0.017 MWDERIVEDUNIT_1__second;
  r134: C4b_C2a_C3b_CR1 => ; r134_k__dC4bC2aC3bCR1*C4b_C2a_C3b_CR1*Plasma;
    r134_k__dC4bC2aC3bCR1 = 0.017 MWDERIVEDUNIT_1__second;
  r40: C3W_Bb_FH => ; r40_k__dC3WBbFH*C3W_Bb_FH*Plasma;
    r40_k__dC3WBbFH = 0.017 MWDERIVEDUNIT_1__second;
  r84: fC3b_Bb_FH => ; r84_k__dfC3bBbFH*fC3b_Bb_FH*Plasma;
    r84_k__dfC3bBbFH = 0.017 MWDERIVEDUNIT_1__second;
  r124: C3 => ; r124_k__C3W*C3*Plasma;
    r124_k__C3W = 4.5e-6 MWDERIVEDUNIT_1__second;
  r64: FH => ; k__dFH*FH*Plasma;
    k__dFH = 3.7e-6 MWDERIVEDUNIT_1__second;
  r101: P => ; k__dP*P*Plasma;
    k__dP = 2.7e-7 MWDERIVEDUNIT_1__second;
  r76: => C2b; (r76_k_C1_catC2*C4b_C2*C1/(r76_k_C1_mC2*(1 + C4b_C2/r76_k_C1_mC2 + fC3b_C4b_C2/r76_k_C1_mC2 + C4/r76_k_C1_mC4)) + r76_k_C1_catC2*fC3b_C4b_C2*C1/(r76_k_C1_mC2*(1 + C4b_C2/r76_k_C1_mC2 + fC3b_C4b_C2/r76_k_C1_mC2 + C4/r76_k_C1_mC4)) + r76_k_MASP1_catC2*MBL_MASP1*C4b_C2/(r76_k_MASP1_mC2*(1 + C4b_C2/r76_k_MASP1_mC2 + fC3b_C4b_C2/r76_k_MASP1_mC2 + C4/r76_k_MASP1_mC4)) + r76_k_MASP2_catC2*MBL_MASP2*C4b_C2/(r76_k_MASP2_mC2*(1 + C4b_C2/r76_k_MASP2_mC2 + fC3b_C4b_C2/r76_k_MASP2_mC2 + C4/r76_k_MASP2_mC4)) + r76_k_MASP1_catC2*MBL_MASP1*fC3b_C4b_C2/(r76_k_MASP1_mC2*(1 + C4b_C2/r76_k_MASP1_mC2 + fC3b_C4b_C2/r76_k_MASP1_mC2 + C4/r76_k_MASP1_mC4)) + r76_k_MASP2_catC2*MBL_MASP2*fC3b_C4b_C2/(r76_k_MASP2_mC2*(1 + C4b_C2/r76_k_MASP2_mC2 + fC3b_C4b_C2/r76_k_MASP2_mC2 + C4/r76_k_MASP2_mC4)))*Plasma;
    r76_k_C1_catC2 = 5.1 MWDERIVEDUNIT_1__second; r76_k_C1_mC2 = 6.1e-6 MWBUILTINUNIT_molarity; r76_k_C1_mC4 = 6.1e-6 MWBUILTINUNIT_molarity; r76_k_MASP1_mC2 = 4.8e-6 MWBUILTINUNIT_molarity; r76_k_MASP1_catC2 = 0.1 MWDERIVEDUNIT_1__second; r76_k_MASP1_mC4 = 5.2e-6 MWBUILTINUNIT_molarity; r76_k_MASP2_catC2 = 5.6 MWDERIVEDUNIT_1__second; r76_k_MASP2_mC2 = 5.2e-6 MWBUILTINUNIT_molarity; r76_k_MASP2_mC4 = 8.5e-8 MWBUILTINUNIT_molarity;
  r77: => C2a; (r77_k__dC4bC2aC4BP*C4b_C2a_C4BP + r77_k__dC4bC2aCR1*C4b_C2a_CR1 + k__C4bC2aC3b*C4b_C2a_C3b + r77_k__dC4bC2aC3bCR1*C4b_C2a_C3b_CR1)*Plasma;
    r77_k__dC4bC2aC4BP = 0.017 MWDERIVEDUNIT_1__second; r77_k__dC4bC2aCR1 = 0.017 MWDERIVEDUNIT_1__second; k__C4bC2aC3b = 0.005 MWDERIVEDUNIT_1__second; r77_k__dC4bC2aC3bCR1 = 0.017 MWDERIVEDUNIT_1__second;
  r29: => Bb; (r29_k__dC3WBbFH*C3W_Bb_FH + r29_k__dfC3bBbFH*fC3b_Bb_FH + k__fC3bBbP*fC3b_Bb_P + r29_k__dfC3bBbCR1*fC3b_Bb_CR1 + r29_k__dfC3bBbDAF*fC3b_Bb_DAF + r29_k__dfC3bBbC3bFH*fC3b_Bb_C3b_FH + r29_k__fC3bBb*fC3b_Bb + r29_k__dfC3bBbC3bCR1*fC3b_Bb_C3b_CR1 + r29_k__dfC3bBbC3bDAF*fC3b_Bb_C3b_DAF + k__dC4bC2aC3bDAF*C4b_C2a_C3b_DAF + r29_k__dC4bC2aC3bCR1*C4b_C2a_C3b_CR1 + r29_k__dC4bC2aCR1*C4b_C2a_CR1 + r29_k__dC4bC2aDAF*C4b_C2a_DAF + k__fC3bBbC3bP*fC3b_Bb_C3b_P)*Plasma;
    r29_k__dC3WBbFH = 0.017 MWDERIVEDUNIT_1__second; r29_k__dfC3bBbFH = 0.017 MWDERIVEDUNIT_1__second; k__fC3bBbP = 0.00077 MWDERIVEDUNIT_1__second; r29_k__dfC3bBbCR1 = 0.017 MWDERIVEDUNIT_1__second; r29_k__dfC3bBbDAF = 0.017 MWDERIVEDUNIT_1__second; r29_k__dfC3bBbC3bFH = 0.017 MWDERIVEDUNIT_1__second; r29_k__fC3bBb = 0.0077 MWDERIVEDUNIT_1__second; r29_k__dfC3bBbC3bCR1 = 0.017 MWDERIVEDUNIT_1__second; r29_k__dfC3bBbC3bDAF = 0.017 MWDERIVEDUNIT_1__second; k__dC4bC2aC3bDAF = 0.017 MWDERIVEDUNIT_1__second; r29_k__dC4bC2aC3bCR1 = 0.017 MWDERIVEDUNIT_1__second; r29_k__dC4bC2aCR1 = 0.017 MWDERIVEDUNIT_1__second; r29_k__dC4bC2aDAF = 0.017 MWDERIVEDUNIT_1__second; k__fC3bBbC3bP = 0.00057 MWDERIVEDUNIT_1__second;
  r31: => FB; k__sFB*Plasma;
    k__sFB = 1.3e-11 MWDERIVEDUNIT_molarity__second;
  r123: => C3; k__sC3*Plasma;
    k__sC3 = 5.3e-11 MWDERIVEDUNIT_molarity__second;
  r63: => FH; k__sFH*Plasma;
    k__sFH = 1.17e-11 MWDERIVEDUNIT_molarity__second;
  r100: => P; k__sP*Plasma;
    k__sP = 1.17e-12 MWDERIVEDUNIT_molarity__second;
  r43: => Ba; (r43_k_FD_catfC3bFBP*fC3b_FB_P*FD/(r43_k_FD_mfC3bFBP + fC3b_FB_P + lgG_fC3b_FB + lgG_fC3b_FB_P + C3b_FB + fC3b_C4b_FB + fC3b_C4b_P_FB + fC3b_C3b_FB) + r43_k_FD_catlgGfC3bFB*lgG_fC3b_FB*FD/(r43_k_FD_mlgGfC3bFB + lgG_fC3b_FB + fC3b_FB_P + lgG_fC3b_FB_P + C3b_FB + fC3b_C4b_FB + fC3b_C4b_P_FB + fC3b_C3b_FB) + k_FD_catlgGfC3bFBP*lgG_fC3b_FB_P*FD/(k_FD_mlgGfC3bFBP + lgG_fC3b_FB_P + fC3b_FB_P + lgG_fC3b_FB + C3b_FB + fC3b_C4b_FB + fC3b_C4b_P_FB + fC3b_C3b_FB) + r43_k_FD_catfC3bC4bFB*fC3b_C4b_FB*FD/(r43_k_FD_mfC3bC4bFB + fC3b_C4b_FB + fC3b_FB_P + lgG_fC3b_FB + lgG_fC3b_FB_P + C3b_FB + fC3b_C4b_P_FB + fC3b_C3b_FB) + r43_k_FD_catC3bFB*C3b_FB*FD/(r43_k_FD_mC3bFB + C3b_FB + fC3b_C4b_FB + fC3b_FB_P + lgG_fC3b_FB + lgG_fC3b_FB_P + fC3b_C4b_P_FB + fC3b_C3b_FB) + r43_k_FD_catfC3bC4bPFB*fC3b_C4b_P_FB*FD/(r43_k_FD_mfC3bC4bPFB + fC3b_C4b_P_FB + C3b_FB + fC3b_C4b_FB + fC3b_FB_P + lgG_fC3b_FB + lgG_fC3b_FB_P + fC3b_C3b_FB) + r43_k_FD_catfC3bC3bFB*fC3b_C3b_FB*FD/(r43_k_FD_mfC3bC3bFB + fC3b_C3b_FB + C3b_FB + fC3b_FB_P + lgG_fC3b_FB + lgG_fC3b_FB_P + fC3b_C4b_FB + fC3b_C4b_P_FB))*Plasma;
    r43_k_FD_catfC3bFBP = 5 MWDERIVEDUNIT_1__second; r43_k_FD_mfC3bFBP = 2.5e-6 MWBUILTINUNIT_molarity; r43_k_FD_catlgGfC3bFB = 5 MWDERIVEDUNIT_1__second; r43_k_FD_mlgGfC3bFB = 2.5e-6 MWBUILTINUNIT_molarity; k_FD_catlgGfC3bFBP = 5 MWDERIVEDUNIT_1__second; k_FD_mlgGfC3bFBP = 2.5e-6 MWBUILTINUNIT_molarity; r43_k_FD_catfC3bC4bFB = 5 MWDERIVEDUNIT_1__second; r43_k_FD_mfC3bC4bFB = 2.5e-6 MWBUILTINUNIT_molarity; r43_k_FD_catC3bFB = 1.32 MWDERIVEDUNIT_1__second; r43_k_FD_mC3bFB = 2.52e-7 MWBUILTINUNIT_molarity; r43_k_FD_catfC3bC4bPFB = 5 MWDERIVEDUNIT_1__second; r43_k_FD_mfC3bC4bPFB = 2.5e-6 MWBUILTINUNIT_molarity; r43_k_FD_catfC3bC3bFB = 5 MWDERIVEDUNIT_1__second; r43_k_FD_mfC3bC3bFB = 2.5e-6 MWBUILTINUNIT_molarity;
  r60: lgG_fC3b + FB -> lgG_fC3b_FB; k__lgGfC3bFB_1*lgG_fC3b*FB*Plasma - k__lgGfC3bFB_2*lgG_fC3b_FB*Plasma;
    k__lgGfC3bFB_1 = 213000 MWDERIVEDUNIT_1__molarity_second; k__lgGfC3bFB_2 = 0.155 MWDERIVEDUNIT_1__second;
  r121: P + lgG_fC3b_FB -> lgG_fC3b_FB_P; k__lgGfC3bFBP_1*P*lgG_fC3b_FB*Plasma - k__lgGfC3bFBP_2*lgG_fC3b_FB_P*Plasma;
    k__lgGfC3bFBP_1 = 150000 MWDERIVEDUNIT_1__molarity_second; k__lgGfC3bFBP_2 = 0.000155 MWDERIVEDUNIT_1__second;
  r265: lgG_fC3b_FB_P => ; r265_k_FD_catC3WFB*C3W_FB*FD/(r265_k_FD_mC3WFB + C3W_FB + fC3b_FB + fC3b_FB_P + lgG_fC3b_FB + lgG_fC3b_FB_P + C3b_FB + fC3b_C4b_FB + fC3b_C4b_P_FB + fC3b_C3b_FB)*Plasma;
    r265_k_FD_catC3WFB = 5 MWDERIVEDUNIT_1__second; r265_k_FD_mC3WFB = 2.5e-6 MWBUILTINUNIT_molarity;
  r111: CR1 + fC3b -> fC3b_CR1; k__fC3bCR1_1*CR1*fC3b*Plasma - k__fC3bCR1_2*fC3b_CR1*Plasma;
    k__fC3bCR1_1 = 4400000 MWDERIVEDUNIT_1__molarity_second; k__fC3bCR1_2 = 0.057 MWDERIVEDUNIT_1__second;
  r127: C3b_FH => ; r127_k_FI_catC3bFH*C3b_FH*FI/(r127_k_FI_mC3bFH + C3b_FH + fC3b_FH + C3b_CR1 + fC3b_CR1 + C3W_FH + fC3b_C4b_FH + fC3b_C4b_CR1)*Plasma;
    r127_k_FI_catC3bFH = 1.32 MWDERIVEDUNIT_1__second; r127_k_FI_mC3bFH = 2.52e-7 MWBUILTINUNIT_molarity;
  r38: fC3b_FH => ; r38_k_FI_catfC3bFH*fC3b_FH*FI/(r38_k_FI_mfC3bFH + fC3b_FH + C3b_FH + C3b_CR1 + fC3b_CR1 + C3W_FH + fC3b_C4b_FH + fC3b_C4b_CR1)*Plasma;
    r38_k_FI_catfC3bFH = 1.32 MWDERIVEDUNIT_1__second; r38_k_FI_mfC3bFH = 2.52e-7 MWBUILTINUNIT_molarity;
  r129: C3b_CR1 => ; r129_k_FI_catC3bCR1*C3b_CR1*FI/(r129_k_FI_mC3bCR1 + C3b_CR1 + fC3b_CR1 + C3b_FH + fC3b_FH + C3W_FH + fC3b_C4b_FH + fC3b_C4b_CR1)*Plasma;
    r129_k_FI_catC3bCR1 = 1.32 MWDERIVEDUNIT_1__second; r129_k_FI_mC3bCR1 = 2.52e-7 MWBUILTINUNIT_molarity;
  r112: fC3b_CR1 => ; r112_k_FI_catfC3bCR1*fC3b_CR1*FI/(r112_k_FI_mfC3bCR1 + fC3b_CR1 + C3b_CR1 + C3b_FH + fC3b_FH + C3W_FH + fC3b_C4b_FH + fC3b_C4b_CR1)*Plasma;
    r112_k_FI_catfC3bCR1 = 1.32 MWDERIVEDUNIT_1__second; r112_k_FI_mfC3bCR1 = 2.52e-7 MWBUILTINUNIT_molarity;
  r90: FB + C3b -> C3b_FB; k__C3bFB_1*FB*C3b*Plasma - k__C3bFB_2*C3b_FB*Plasma;
    k__C3bFB_1 = 213000 MWDERIVEDUNIT_1__molarity_second; k__C3bFB_2 = 0.155 MWDERIVEDUNIT_1__second;
  r91: C3b_FB => ; r91_k_FD_catC3bFB*C3b_FB*FD/(r91_k_FD_mC3bFB + C3b_FB + fC3b_FB + fC3b_FB_P + lgG_fC3b_FB + lgG_fC3b_FB_P + C3W_FB + fC3b_C4b_FB + fC3b_C4b_P_FB + fC3b_C3b_FB)*Plasma;
    r91_k_FD_catC3bFB = 5 MWDERIVEDUNIT_1__second; r91_k_FD_mC3bFB = 2.5e-6 MWBUILTINUNIT_molarity;
  r110: fC3b_FB_P => ; r110_k_FD_catfC3bFBP*fC3b_FB_P*FD/(r110_k_FD_mfC3bFBP + fC3b_FB_P + fC3b_FB + C3W_FB + lgG_fC3b_FB + lgG_fC3b_FB_P + C3b_FB + fC3b_C4b_FB + fC3b_C4b_P_FB + fC3b_C3b_FB)*Plasma;
    r110_k_FD_catfC3bFBP = 5 MWDERIVEDUNIT_1__second; r110_k_FD_mfC3bFBP = 2.5e-6 MWBUILTINUNIT_molarity;
  r61: lgG_fC3b_FB => ; r61_k_FD_catlgGfC3bFB*lgG_fC3b_FB*FD/(r61_k_FD_mlgGfC3bFB + lgG_fC3b_FB + fC3b_FB + fC3b_FB_P + lgG_fC3b_FB_P + C3W_FB + C3b_FB + fC3b_C4b_FB + fC3b_C4b_P_FB + fC3b_C3b_FB)*Plasma;
    r61_k_FD_catlgGfC3bFB = 5 MWDERIVEDUNIT_1__second; r61_k_FD_mlgGfC3bFB = 2.5e-6 MWBUILTINUNIT_molarity;
  r10: MBL + MASP2 -> MBL_MASP2; k__MBLMASP2_1*MBL*MASP2*Plasma - k__MBLMASP2_2*MBL_MASP2*Plasma;
    k__MBLMASP2_1 = 230000 MWDERIVEDUNIT_1__molarity_second; k__MBLMASP2_2 = 0.00055 MWDERIVEDUNIT_1__second;
  r12: C1INH + MASP1 => C1INH_MASP1; r12_k__C1INHMASP1*C1INH*MASP1*Plasma;
    r12_k__C1INHMASP1 = 6300 MWDERIVEDUNIT_1__molarity_second;
  r11: MBL_MASP2 => ; r11_k__C1INHMASP2*C1INH*MBL_MASP2*Plasma;
    r11_k__C1INHMASP2 = 22000000 MWDERIVEDUNIT_1__molarity_second;
  r9: MBL_MASP1 => ; r9_k__C1INHMASP1*C1INH*MBL_MASP1*Plasma;
    r9_k__C1INHMASP1 = 6300 MWDERIVEDUNIT_1__molarity_second;
  r15: => C1INH_MASP2; r15_k__C1INHMASP2*C1INH*MBL_MASP2*Plasma;
    r15_k__C1INHMASP2 = 22000000 MWDERIVEDUNIT_1__molarity_second;
  r13: => C1INH_MASP1; r13_k__C1INHMASP1*C1INH*MBL_MASP1*Plasma;
    r13_k__C1INHMASP1 = 6300 MWDERIVEDUNIT_1__molarity_second;
  r74: C4b_C2 => ; (r74_k_C1_catC2*C4b_C2*C1/(r74_k_C1_mC2*(1 + C4b_C2/r74_k_C1_mC2 + fC3b_C4b_C2/r74_k_C1_mC2 + C4/r74_k_C1_mC4)) + r74_k_MASP1_catC2*MBL_MASP1*C4b_C2/(r74_k_MASP1_mC2*(1 + C4b_C2/r74_k_MASP1_mC2 + fC3b_C4b_C2/r74_k_MASP1_mC2 + C4/r74_k_MASP1_mC4)) + r74_k_MASP2_catC2*MBL_MASP2*C4b_C2/(r74_k_MASP2_mC2*(1 + C4b_C2/r74_k_MASP2_mC2 + fC3b_C4b_C2/r74_k_MASP2_mC2 + C4/r74_k_MASP2_mC4)))*Plasma;
    r74_k_C1_catC2 = 5.1 MWDERIVEDUNIT_1__second; r74_k_C1_mC2 = 6.1e-6 MWBUILTINUNIT_molarity; r74_k_C1_mC4 = 6.1e-6 MWBUILTINUNIT_molarity; r74_k_MASP1_mC2 = 4.8e-6 MWBUILTINUNIT_molarity; r74_k_MASP1_catC2 = 0.1 MWDERIVEDUNIT_1__second; r74_k_MASP1_mC4 = 5.2e-6 MWBUILTINUNIT_molarity; r74_k_MASP2_catC2 = 5.6 MWDERIVEDUNIT_1__second; r74_k_MASP2_mC2 = 5.2e-6 MWBUILTINUNIT_molarity; r74_k_MASP2_mC4 = 8.5e-8 MWBUILTINUNIT_molarity;
  r102: => C4b_C2a; (r102_k_C1_catC2*C4b_C2*C1/(r102_k_C1_mC2*(1 + C4b_C2/r102_k_C1_mC2 + fC3b_C4b_C2/r102_k_C1_mC2 + C4/r102_k_C1_mC4)) + r102_k_MASP1_catC2*MBL_MASP1*C4b_C2/(r102_k_MASP1_mC2*(1 + C4b_C2/r102_k_MASP1_mC2 + fC3b_C4b_C2/r102_k_MASP1_mC2 + C4/r102_k_MASP1_mC4)) + r102_k_MASP2_catC2*MBL_MASP2*C4b_C2/(r102_k_MASP2_mC2*(1 + C4b_C2/r102_k_MASP2_mC2 + fC3b_C4b_C2/r102_k_MASP2_mC2 + C4/r102_k_MASP2_mC4)))*Plasma;
    r102_k_C1_catC2 = 5.1 MWDERIVEDUNIT_1__second; r102_k_C1_mC2 = 6.1e-6 MWBUILTINUNIT_molarity; r102_k_C1_mC4 = 6.1e-6 MWBUILTINUNIT_molarity; r102_k_MASP1_mC2 = 4.8e-6 MWBUILTINUNIT_molarity; r102_k_MASP1_catC2 = 0.1 MWDERIVEDUNIT_1__second; r102_k_MASP1_mC4 = 5.2e-6 MWBUILTINUNIT_molarity; r102_k_MASP2_catC2 = 5.6 MWDERIVEDUNIT_1__second; r102_k_MASP2_mC2 = 5.2e-6 MWBUILTINUNIT_molarity; r102_k_MASP2_mC4 = 8.5e-8 MWBUILTINUNIT_molarity;
  r79: C4b + fC3b => fC3b_C4b; k__fC3bC4b*fC3b*C4b*Plasma;
    k__fC3bC4b = 420000000 MWDERIVEDUNIT_1__molarity_second;
  r66: FB + fC3b_C4b -> fC3b_C4b_FB; (k__fC3bC4bFB_1*FB*fC3b_C4b - k__fC3bC4bFB_2*fC3b_C4b_FB)*Plasma;
    k__fC3bC4bFB_1 = 213000 MWDERIVEDUNIT_1__molarity_second; k__fC3bC4bFB_2 = 0.155 MWDERIVEDUNIT_1__second;
  r81: FH + fC3b_C4b -> fC3b_C4b_FH; k__fC3bC4bFH_1*FH*fC3b_C4b*Plasma - k__fC3bC4bFH_2*fC3b_C4b_FH*Plasma;
    k__fC3bC4bFH_1 = 1100000 MWDERIVEDUNIT_1__molarity_second; k__fC3bC4bFH_2 = 0.059 MWDERIVEDUNIT_1__second;
  r96: fC3b_C4b + CR1 -> fC3b_C4b_CR1; k__fC3bC4bCR1_1*fC3b_C4b*CR1*Plasma - k__fC3bC4bCR1_2*fC3b_C4b_CR1*Plasma;
    k__fC3bC4bCR1_1 = 98000 MWDERIVEDUNIT_1__molarity_second; k__fC3bC4bCR1_2 = 0.0021 MWDERIVEDUNIT_1__second;
  r85: P + fC3b_C4b -> fC3b_C4b_P; k__fC3bC4bP_1*P*fC3b_C4b*Plasma - k__fC3bC4bP_2*fC3b_C4b_P*Plasma;
    k__fC3bC4bP_1 = 150000 MWDERIVEDUNIT_1__molarity_second; k__fC3bC4bP_2 = 0.000155 MWDERIVEDUNIT_1__second;
  r92: fC3b_C4b + C2 -> fC3b_C4b_C2; k__fC3bC4bC2_1*fC3b_C4b*C2*Plasma - k__fC3bC4bC2_2*fC3b_C4b_C2*Plasma;
    k__fC3bC4bC2_1 = 1600000 MWDERIVEDUNIT_1__molarity_second; k__fC3bC4bC2_2 = 0.0042 MWDERIVEDUNIT_1__second;
  r67: fC3b_C4b_FB => ; r67_k_FD_catfC3bC4bFB*fC3b_C4b_FB*FD/(r67_k_FD_mfC3bC4bFB + fC3b_C4b_FB + C3W_FB + fC3b_FB + fC3b_FB_P + lgG_fC3b_FB + lgG_fC3b_FB_P + C3b_FB + fC3b_C4b_P_FB + fC3b_C3b_FB)*Plasma;
    r67_k_FD_catfC3bC4bFB = 5 MWDERIVEDUNIT_1__second; r67_k_FD_mfC3bC4bFB = 2.5e-6 MWBUILTINUNIT_molarity;
  r266: FB + fC3b_C4b_P -> fC3b_C4b_P_FB; k__fC3bC4bPFB_1*FB*fC3b_C4b_P*Plasma - k__fC3bC4bPFB_2*fC3b_C4b_P_FB*Plasma;
    k__fC3bC4bPFB_1 = 213000 MWDERIVEDUNIT_1__molarity_second; k__fC3bC4bPFB_2 = 0.155 MWDERIVEDUNIT_1__second;
  r69: fC3b_C4b_P_FB => ; r69_k_FD_catfC3bC4bPFB*fC3b_C4b_P_FB*FD/(r69_k_FD_mfC3bC4bPFB + fC3b_C4b_P_FB + fC3b_C4b_FB + C3W_FB + fC3b_FB + fC3b_FB_P + lgG_fC3b_FB + lgG_fC3b_FB_P + C3b_FB + fC3b_C3b_FB)*Plasma;
    r69_k_FD_catfC3bC4bPFB = 5 MWDERIVEDUNIT_1__second; r69_k_FD_mfC3bC4bPFB = 2.5e-6 MWBUILTINUNIT_molarity;
  r68: C3W_FH => ; r68_k_FI_catC3WFH*C3W_FH*FI/(r68_k_FI_mC3WFH + C3W_FH + fC3b_FH + fC3b_CR1 + fC3b_C4b_FH + fC3b_C4b_CR1 + C3b_FH + C3b_CR1)*Plasma;
    r68_k_FI_mC3WFH = 2.52e-7 MWBUILTINUNIT_molarity; r68_k_FI_catC3WFH = 1.32 MWDERIVEDUNIT_1__second;
  r267: fC3b_C4b_CR1 => ; r267_k_FI_catfC3bC4bCR1*fC3b_C4b_CR1*FI/(r267_k_FI_mfC3bC4bCR1 + fC3b_C4b_CR1 + C3W_FB + fC3b_FH + fC3b_CR1 + C3b_FH + C3b_CR1 + fC3b_C4b_FH)*Plasma;
    r267_k_FI_catfC3bC4bCR1 = 1.32 MWDERIVEDUNIT_1__second; r267_k_FI_mfC3bC4bCR1 = 2.52e-7 MWBUILTINUNIT_molarity;
  r82: fC3b_C4b_FH => ; r82_k_FI_catfC3bC4bFH*fC3b_C4b_FH*FI/(r82_k_FI_mfC3bC4bFH + fC3b_C4b_FH + C3W_FH + fC3b_FH + fC3b_CR1 + C3b_FH + C3b_CR1 + fC3b_C4b_CR1)*Plasma;
    r82_k_FI_catfC3bC4bFH = 1.32 MWDERIVEDUNIT_1__second; r82_k_FI_mfC3bC4bFH = 2.52e-7 MWBUILTINUNIT_molarity;
  r107: fC3b_C4b_C2 => C4b_C2a_C3b; (r107_k_C1_catC2*fC3b_C4b_C2*C2/(r107_k_C1_mC2*(1 + C4b_C2/r107_k_C1_mC2 + fC3b_C4b_C2/r107_k_C1_mC2 + C4/r107_k_C1_mC4)) + r107_k_MASP1_catC2*MBL_MASP1*fC3b_C4b_C2/(r107_k_MASP1_mC2*(1 + C4b_C2/r107_k_MASP1_mC2 + fC3b_C4b_C2/r107_k_MASP1_mC2 + C4/r107_k_MASP1_mC4)) + r107_k_MASP2_catC2*MBL_MASP2*fC3b_C4b_C2/(r107_k_MASP2_mC2*(1 + C4b_C2/r107_k_MASP2_mC2 + fC3b_C4b_C2/r107_k_MASP2_mC2 + C4/r107_k_MASP2_mC4)))*Plasma;
    r107_k_C1_catC2 = 5.1 MWDERIVEDUNIT_1__second; r107_k_C1_mC2 = 6.1e-6 MWBUILTINUNIT_molarity; r107_k_C1_mC4 = 6.1e-6 MWBUILTINUNIT_molarity; r107_k_MASP1_catC2 = 0.1 MWDERIVEDUNIT_1__second; r107_k_MASP1_mC2 = 4.8e-6 MWBUILTINUNIT_molarity; r107_k_MASP1_mC4 = 5.2e-6 MWBUILTINUNIT_molarity; r107_k_MASP2_catC2 = 5.6 MWDERIVEDUNIT_1__second; r107_k_MASP2_mC2 = 5.2e-6 MWBUILTINUNIT_molarity; r107_k_MASP2_mC4 = 8.5e-8 MWBUILTINUNIT_molarity;
  r50: => lgG_fC3b; r50_k__lgGfC3b*lgG_fC3b*W*Plasma;
    r50_k__lgGfC3b = 420000000 MWDERIVEDUNIT_1__molarity_second;
  r251: C5a_C5aR1 => IL6; k_C5aC5aR1_catIL6*C5a_C5aR1*Plasma;
    k_C5aC5aR1_catIL6 = 0.1 MWDERIVEDUNIT_1__second;
  r1: C1r + C1s -> C1r_C1s; k__C1rC1s_1*C1r*C1s*Plasma - k__C1rC1s_2*C1r_C1s*Plasma;
    k__C1rC1s_1 = 610000 MWDERIVEDUNIT_1__molarity_second; k__C1rC1s_2 = 0.00344 MWDERIVEDUNIT_1__second;
  r34: C4 + C1s -> C1s_C4; k__C1sC4_1*C4*C1s*Plasma - k__C1sC4_2*C1s_C4*Plasma;
    k__C1sC4_1 = 790000 MWDERIVEDUNIT_1__molarity_second; k__C1sC4_2 = 0.48 MWDERIVEDUNIT_1__second;
  r33: MASP2 + C4 -> MASP2_C4; k__MASP2C4_1*MASP2*C4*Plasma - k__MASP2C4_2*MASP2_C4*Plasma;
    k__MASP2C4_1 = 790000 MWDERIVEDUNIT_1__molarity_second; k__MASP2C4_2 = 0.48 MWDERIVEDUNIT_1__second;
  r106: C4b_C2a_CR1 => ; r106_k__dC4bC2aCR1*C4b_C2a_CR1*Plasma;
    r106_k__dC4bC2aCR1 = 0.017 MWDERIVEDUNIT_1__second;
  r104: C4b_C2a_DAF => ; r104_k__dC4bC2aDAF*C4b_C2a_DAF*Plasma;
    r104_k__dC4bC2aDAF = 0.017 MWDERIVEDUNIT_1__second;
  r88: C4b_C2a_C4BP => ; r88_k__dC4bC2aC4BP*C4b_C2a_C4BP*Plasma;
    r88_k__dC4bC2aC4BP = 0.017 MWDERIVEDUNIT_1__second;
  r117: => fC3b_Bb_C3b; r117_k_FD_catfC3bC3bFB*fC3b_C3b_FB*FD/(r117_k_FD_mfC3bC3bFB + fC3b_C3b_FB + C3W_FB + fC3b_FB + C3b_FB + fC3b_FB_P + fC3b_C4b_FB + lgG_fC3b_FB + lgG_fC3b_FB_P + fC3b_C4b_P_FB)*Plasma;
    r117_k_FD_mfC3bC3bFB = 2.5e-6 MWBUILTINUNIT_molarity; r117_k_FD_catfC3bC3bFB = 5 MWDERIVEDUNIT_1__second;
  r89: C3b_FB + fC3b -> fC3b_C3b_FB; k__fC3bC3bFB_1*C3b_FB*fC3b*Plasma - k__fC3bC3bFB_2*fC3b_C3b_FB*Plasma;
    k__fC3bC3bFB_1 = 213000 MWDERIVEDUNIT_1__molarity_second; k__fC3bC3bFB_2 = 0.155 MWDERIVEDUNIT_1__second;
  r18: CoV2N => MASP2; k__CoV2NMASP2*MASP2*CoV2N*Plasma;
    k__CoV2NMASP2 = 69000 MWDERIVEDUNIT_1__molarity_second;
  r75: C2 => C2b + C2a; (r75_k_MASP2_catC2*C2*MASP2/(r75_k_MASP2_mC2 + C2) + k_C1s_catC2*C2*C1s/(k_C1s_mC2 + C2))*Plasma;
    r75_k_MASP2_catC2 = 5.6 MWDERIVEDUNIT_1__second; r75_k_MASP2_mC2 = 5.2e-6 MWBUILTINUNIT_molarity; k_C1s_catC2 = 5.1 MWDERIVEDUNIT_1__second; k_C1s_mC2 = 6.1e-6 MWBUILTINUNIT_molarity;
  r16: CoV2S_lgG => C1q; k__CoV2SlgGC1q*CoV2S_lgG*C1q*Plasma;
    k__CoV2SlgGC1q = 230000 MWDERIVEDUNIT_1__molarity_second;
  r139: C3a_C3aR1 => IL6; k_C3aC3aR1_catIL6*C3a_C3aR1*Plasma;
    k_C3aC3aR1_catIL6 = 0.1 MWDERIVEDUNIT_1__second;
  r199: F10 + F9a -> F9a_F10; k__F9aF10_1*F10*F9a*Plasma - k__F9aF10_2*F9a_F10*Plasma;
    k__F9aF10_1 = 100000000 MWDERIVEDUNIT_1__molarity_second; k__F9aF10_2 = 0.64 MWDERIVEDUNIT_1__second;
  r225: F8 => F8a; k_F2a_catF8*F8*F2a*Plasma;
    k_F2a_catF8 = 20000000 MWDERIVEDUNIT_1__molarity_second;
  r220: F5 => F5a; k_F2a_catF5*F5*F2a*Plasma;
    k_F2a_catF5 = 20000000 MWDERIVEDUNIT_1__molarity_second;
  r242: F2 => F2a; (k_F10a_catF2*F2*F10a + k_MASP1_catF2*F2*MASP1 + k_MASP2_catF2*F2*MASP2)*Plasma;
    k_F10a_catF2 = 7500 MWDERIVEDUNIT_1__molarity_second; k_MASP1_catF2 = 141000 MWDERIVEDUNIT_1__molarity_second; k_MASP2_catF2 = 141000 MWDERIVEDUNIT_1__molarity_second;
  r223: F10a + AT3 => F10a_AT3; k__F10aAT3*F10a*AT3*Plasma;
    k__F10aAT3 = 1500 MWDERIVEDUNIT_1__molarity_second;
  r224: F2a + AT3 => F2a_AT3; k__F2aAT3*F2a*AT3*Plasma;
    k__F2aAT3 = 7100 MWDERIVEDUNIT_1__molarity_second;
  r204: AT3 + F9a => F9a_AT3; k__F9aAT3*AT3*F9a*Plasma;
    k__F9aAT3 = 490 MWDERIVEDUNIT_1__molarity_second;
  r215: F10a + TFPI -> F10a_TFPI; k__F10aTFPI_1*F10a*TFPI*Plasma - k__F10aTFPI_2*F10a_TFPI*Plasma;
    k__F10aTFPI_1 = 900000 MWDERIVEDUNIT_1__molarity_second; k__F10aTFPI_2 = 0.00036 MWDERIVEDUNIT_1__second;
  r226: F2a + A2M => F2a_A2M; k__F2aA2M*F2a*A2M*Plasma;
    k__F2aA2M = 2500 MWDERIVEDUNIT_1__molarity_second;
  r237: F10a => CoV2S; k_F10a_catCoV2S*CoV2S*F10a/(k_F10a_mCoV2S + CoV2S)*Plasma;
    k_F10a_catCoV2S = 0.179 MWDERIVEDUNIT_1__second; k_F10a_mCoV2S = 4.035e-5 MWBUILTINUNIT_molarity;
  r238: F2a => CoV2S; k_F2a_catCoV2S*CoV2S*F2a/(k_F2a_mCoV2S + CoV2S)*Plasma;
    k_F2a_catCoV2S = 1.634e-5 MWDERIVEDUNIT_1__second; k_F2a_mCoV2S = 0.052 MWBUILTINUNIT_molarity;
  r193: F7 + TF -> TF_F7; (k__TFF7_1*F7*TF - k__TFF7_2*TF_F7)*Plasma;
    k__TFF7_1 = 3200000 MWDERIVEDUNIT_1__molarity_second; k__TFF7_2 = 0.0031 MWDERIVEDUNIT_1__second;
  r196: F7a + TF -> TF_F7a; k__TFF7a_1*F7a*TF*Plasma - k__TFF7a_2*TF_F7a*Plasma;
    k__TFF7a_1 = 23000000 MWDERIVEDUNIT_1__molarity_second; k__TFF7a_2 = 0.0031 MWDERIVEDUNIT_1__second;
  r192: F7 => F7a; (k_TFF7a_catF7*F7*TF_F7a + k_F10a_catF7*F7*F10a + k_F2a_catF7*F7*F2a)*Plasma;
    k_TFF7a_catF7 = 440000 MWDERIVEDUNIT_1__molarity_second; k_F10a_catF7 = 13000000 MWDERIVEDUNIT_1__molarity_second; k_F2a_catF7 = 23000 MWDERIVEDUNIT_1__molarity_second;
  r197: F7a + F10 -> F10_F7a; (k__F10F7a_1*F7a*F10 - k__F10F7a_2*F10_F7a)*Plasma;
    k__F10F7a_1 = 100000000 MWDERIVEDUNIT_1__molarity_second; k__F10F7a_2 = 210 MWDERIVEDUNIT_1__second;
  r195: F9 + F7a -> F9_F7a; k__F9F7a_1*F9*F7a*Plasma - k__F9F7a_2*F9_F7a*Plasma;
    k__F9F7a_1 = 100000000 MWDERIVEDUNIT_1__molarity_second; k__F9F7a_2 = 0.9 MWDERIVEDUNIT_1__second;
  r194: => F7a; (r194_k_F7a_catF9a*F9_F7a + r194_k_F7a_catF10a*F10_F7a)*Plasma;
    r194_k_F7a_catF9a = 3.6e-5 MWDERIVEDUNIT_1__second; r194_k_F7a_catF10a = 1.6e-6 MWDERIVEDUNIT_1__second;
  r203: => F9a; r203_k_F9a_catF10a*F9a_F10*Plasma;
    r203_k_F9a_catF10a = 0.0007 MWDERIVEDUNIT_1__second;
  r240: F10a_TFPI + TF_F7a => TF_F7a_F10a_TFPI; k__F10aTFPITFF7a*F10a_TFPI*TF_F7a*Plasma;
    k__F10aTFPITFF7a = 50000000 MWDERIVEDUNIT_1__molarity_second;
  r214: F10a + TF_F7a -> TF_F7a_F10a; k__TFF7aF10a_1*F10a*TF_F7a*Plasma - k__TFF7aF10a_2*TF_F7a_F10a*Plasma;
    k__TFF7aF10a_1 = 22000000 MWDERIVEDUNIT_1__molarity_second; k__TFF7aF10a_2 = 19 MWDERIVEDUNIT_1__second;
  r221: F5a + F10a -> F10a_F5a; k__F10aF5a_1*F5a*F10a*Plasma - k__F10aF5a_2*F10a_F5a*Plasma;
    k__F10aF5a_1 = 400000000 MWDERIVEDUNIT_1__molarity_second; k__F10aF5a_2 = 0.2 MWDERIVEDUNIT_1__second;
  r222: F10a_F5a + F2 -> F10a_F5a_F2; k__F10aF5aF2_1*F10a_F5a*F2*Plasma - k__F10aF5aF2_2*F10a_F5a_F2*Plasma;
    k__F10aF5aF2_1 = 100000000 MWDERIVEDUNIT_1__molarity_second; k__F10aF5aF2_2 = 103 MWDERIVEDUNIT_1__second;
  r200: F9a_F10 => F10a; r200_k_F9a_catF10a*F9a_F10*Plasma;
    r200_k_F9a_catF10a = 0.0007 MWDERIVEDUNIT_1__second;
  r179: F2a + F11 -> F11_F2a; k__F11F2a_1*F2a*F11*Plasma - k__F11F2a_2*F11_F2a*Plasma;
    k__F11F2a_1 = 100000000 MWDERIVEDUNIT_1__molarity_second; k__F11F2a_2 = 5 MWDERIVEDUNIT_1__second;
  r180: F11_F2a => F2a; r180_k_F11_catF2a*F11_F2a*Plasma;
    r180_k_F11_catF2a = 0.00013 MWDERIVEDUNIT_1__second;
  r212: TF_F7a + F10 -> TF_F7a_F10; k__TFF7aF10_1*TF_F7a*F10*Plasma - k__TFF7aF10_2*TF_F7a_F10*Plasma;
    k__TFF7aF10_1 = 25000000 MWDERIVEDUNIT_1__molarity_second; k__TFF7aF10_2 = 1.05 MWDERIVEDUNIT_1__second;
  r213: TF_F7a_F10 => TF_F7a_F10a; k_TFF7a_catF10*TF_F7a_F10*Plasma;
    k_TFF7a_catF10 = 6 MWDERIVEDUNIT_1__second;
  r216: TF_F7a_F10a + TFPI -> TF_F7a_F10a_TFPI; k__TFF7aF10aTFPI_1*TF_F7a_F10a*TFPI*Plasma - k__TFF7aF10aTFPI_2*TF_F7a_F10a_TFPI*Plasma;
    k__TFF7aF10aTFPI_1 = 320000000 MWDERIVEDUNIT_1__molarity_second; k__TFF7aF10aTFPI_2 = 0.00011 MWDERIVEDUNIT_1__second;
  r218: F10a + F8 -> F10a_F8; k__F10aF8_1*F10a*F8*Plasma - k__F10aF8_2*F10a_F8*Plasma;
    k__F10aF8_1 = 100000000 MWDERIVEDUNIT_1__molarity_second; k__F10aF8_2 = 2.1 MWDERIVEDUNIT_1__second;
  r219: F10a_F8 => F8a; r219_k_F10a_catF8a*F10a_F8*Plasma;
    r219_k_F10a_catF8a = 0.023 MWDERIVEDUNIT_1__second;
  r205: F9a + F8a -> F9a_F8a; k__F9aF8a_1*F9a*F8a*Plasma - k__F9aF8a_2*F9a_F8a*Plasma;
    k__F9aF8a_1 = 10000000 MWDERIVEDUNIT_1__molarity_second; k__F9aF8a_2 = 0.005 MWDERIVEDUNIT_1__second;
  r268: F9a_F8a + F10 -> F9a_F8a_F10; k__F9aF8aF10_1*F9a_F8a*F10*Plasma - k__F9aF8aF10_2*F9a_F8a_F10*Plasma;
    k__F9aF8aF10_1 = 100000000 MWDERIVEDUNIT_1__molarity_second; k__F9aF8aF10_2 = 0.001 MWDERIVEDUNIT_1__second;
  r206: => F9a_F8a; r206_k_F9aF8a_catF10*F9a_F8a_F10*Plasma;
    r206_k_F9aF8a_catF10 = 8.2 MWDERIVEDUNIT_1__second;
  r211: TF_F7a + AT3 => TF_F7a_AT3; k__TFF7aAT3*TF_F7a*AT3*Plasma;
    k__TFF7aAT3 = 230 MWDERIVEDUNIT_1__molarity_second;
  r209: TF_F7a + F9 -> TF_F7a_F9; k__TFF7aF9_1*TF_F7a*F9*Plasma - k__TFF7aF9_2*TF_F7a_F9*Plasma;
    k__TFF7aF9_1 = 10000000 MWDERIVEDUNIT_1__molarity_second; k__TFF7aF9_2 = 2.4 MWDERIVEDUNIT_1__second;
  r202: F9_F7a => F9a; r202_k_F7a_catF9a*F9_F7a*Plasma;
    r202_k_F7a_catF9a = 3.6e-5 MWDERIVEDUNIT_1__second;
  r210: TF_F7a_F9 => TF_F7a; k_TFF7a_catF9*TF_F7a_F9*Plasma;
    k_TFF7a_catF9 = 1.8 MWDERIVEDUNIT_1__second;
  r175: F12 + F12a -> F12_F12a; k__F12F12a_1*F12*F12a*Plasma - k__F12F12a_2*F12_F12a*Plasma;
    k__F12F12a_1 = 100000000 MWDERIVEDUNIT_1__molarity_second; k__F12F12a_2 = 750 MWDERIVEDUNIT_1__second;
  r190: AT3 + F12a => F12a_AT3; k__F12aAT3*AT3*F12a*Plasma;
    k__F12aAT3 = 21.6 MWDERIVEDUNIT_1__molarity_second;
  r191: F11 + F12a -> F12a_F11; k__F12aF11_1*F11*F12a*Plasma - k__F12aF11_2*F12a_F11*Plasma;
    k__F12aF11_1 = 100000000 MWDERIVEDUNIT_1__molarity_second; k__F12aF11_2 = 200 MWDERIVEDUNIT_1__second;
  r185: F12a_F11 => F11a; r185_k_F12a_catF11a*F12a_F11*Plasma;
    r185_k_F12a_catF11a = 0.0057 MWDERIVEDUNIT_1__second;
  r207: F9 + F11a -> F11a_F9; k__F11aF9_1*F9*F11a*Plasma - k__F11aF9_2*F11a_F9*Plasma;
    k__F11aF9_1 = 100000000 MWDERIVEDUNIT_1__molarity_second; k__F11aF9_2 = 41 MWDERIVEDUNIT_1__second;
  r189: AT3 + F11a => F11a_AT3; k__F11aAT3*AT3*F11a*Plasma;
    k__F11aAT3 = 320 MWDERIVEDUNIT_1__molarity_second;
  r172: F12 + KAL -> KAL_F12; k__KALF12_1*F12*KAL*Plasma - k__KALF12_2*KAL_F12*Plasma;
    k__KALF12_1 = 100000000 MWDERIVEDUNIT_1__molarity_second; k__KALF12_2 = 45.3 MWDERIVEDUNIT_1__second;
  r181: KAL_F12 => F12a; k_KAL_catF12a*KAL_F12*Plasma;
    k_KAL_catF12a = 5.7 MWDERIVEDUNIT_1__second;
  r217: F9a_F8a_F10 => F10a; r217_k_F9aF8a_catF10*F9a_F8a_F10*Plasma;
    r217_k_F9aF8a_catF10 = 8.2 MWDERIVEDUNIT_1__second;
  r201: => F10a; r201_k_F10a_catF8a*F10a_F8*Plasma;
    r201_k_F10a_catF8a = 0.023 MWDERIVEDUNIT_1__second;
  r198: F10_F7a => F10a; r198_k_F7a_catF10a*F10_F7a*Plasma;
    r198_k_F7a_catF10a = 1.6e-6 MWDERIVEDUNIT_1__second;
  r239: F12a => C1r; k_F12a_catC1r*C1r*F12a*Plasma;
    k_F12a_catC1r = 100 MWDERIVEDUNIT_1__molarity_second;
  r270: C1INH + F12a => ; k__C1INHF12a*C1INH*F12a*Plasma;
    k__C1INHF12a = 3600 MWDERIVEDUNIT_1__molarity_second;
  r264: C1INH + F2a => ; k__C1INHF2a*C1INH*F2a*Plasma;
    k__C1INHF2a = 100 MWDERIVEDUNIT_1__molarity_second;
  r262: C1INH + Pn => ; k__C1INHPn*C1INH*Pn*Plasma;
    k__C1INHPn = 5500 MWDERIVEDUNIT_1__molarity_second;
  r208: F11a_F9 => F9a; r208_k_F11a_catF9a*F11a_F9*Plasma;
    r208_k_F11a_catF9a = 7.7 MWDERIVEDUNIT_1__second;
  r182: => F12a; r182_k_F12a_catF11a*F12a_F11*Plasma;
    r182_k_F12a_catF11a = 0.0057 MWDERIVEDUNIT_1__second;
  r230: IL6 => F1; k_IL6_catF1*IL6*Plasma;
    k_IL6_catF1 = 1e-8 MWDERIVEDUNIT_1__second;
  r186: => F11a; (r186_k_F11a_catF9a*F11a_F9 + r186_k_F11_catF2a*F11_F2a)*Plasma;
    r186_k_F11a_catF9a = 7.7 MWDERIVEDUNIT_1__second; r186_k_F11_catF2a = 0.00013 MWDERIVEDUNIT_1__second;
  r177: F12_F12a => F12a; k_F12F12a_catF12a*F12_F12a*Plasma;
    k_F12F12a_catF12a = 0.033 MWDERIVEDUNIT_1__second;
  r269: KAL + C1INH => ; k__C1INHKAL*C1INH*KAL*Plasma;
    k__C1INHKAL = 17000 MWDERIVEDUNIT_1__molarity_second;
  r241: FH + F2a => ; k__FHF2a*FH*F2a*Plasma;
    k__FHF2a = 33670000 MWDERIVEDUNIT_1__molarity_second;
  r263: FH + F1a => ; k__FHF1a*FH*F1a*Plasma;
    k__FHF1a = 26200000 MWDERIVEDUNIT_1__molarity_second;
  r227: F2a + F1 -> F2a_F1; k__F2aF1_1*F2a*F1*Plasma - k__F2aF1_2*F2a_F1*Plasma;
    k__F2aF1_1 = 11700000 MWDERIVEDUNIT_1__molarity_second; k__F2aF1_2 = 84 MWDERIVEDUNIT_1__second;
  r228: F2a_F1 => F1a; k_F2a_catF1a*F2a_F1*Plasma;
    k_F2a_catF1a = 84 MWDERIVEDUNIT_1__second;
  r236: C1INH + F11a => ; k__F11aC1INH*C1INH*F11a*Plasma;
    k__F11aC1INH = 1800 MWDERIVEDUNIT_1__molarity_second;
  r235: C5a => TF; k_C5a_catTF*C5a*Plasma;
    k_C5a_catTF = 1e-5 MWDERIVEDUNIT_1__second;
  r229: F1 => F1a; (k_F2a_catF1*F2a*F1/(k_F2a_mF1 + F1) + k_Pn_catF1*Pn*F1/(k_Pn_mF1 + F1) + k_MASP1_catF1*F1*MASP1 + k_MASP2_catF1*F1*MASP2 + k_LysPg_catF1*F1*Lys_Pg)*Plasma;
    k_MASP1_catF1 = 141000 MWDERIVEDUNIT_1__molarity_second; k_MASP2_catF1 = 141000 MWDERIVEDUNIT_1__molarity_second; k_LysPg_catF1 = 1e-7 MWDERIVEDUNIT_1__molarity_second; k_F2a_catF1 = 59 MWDERIVEDUNIT_1__second; k_F2a_mF1 = 3.16e-6 MWBUILTINUNIT_molarity; k_Pn_catF1 = 7.1 MWDERIVEDUNIT_1__second; k_Pn_mF1 = 6.5e-6 MWBUILTINUNIT_molarity;
  r243: C5b_C6_C7_C8_C9 => F2; k_MAC_catF2*C5b_C6_C7_C8_C9*Plasma;
    k_MAC_catF2 = 0.1 MWDERIVEDUNIT_1__second;
  r234: C3a => TF; k_C3a_catTF*C3a*Plasma;
    k_C3a_catTF = 1e-5 MWDERIVEDUNIT_1__second;
  r4: C1q + gC1qR -> C1q_gC1qR; k__C1qgC1qR_1*C1q*gC1qR*Plasma - k__C1qgC1qR_2*C1q_gC1qR*Plasma;
    k__C1qgC1qR_1 = 400 MWDERIVEDUNIT_1__molarity_second; k__C1qgC1qR_2 = 0.1 MWDERIVEDUNIT_1__second;
  r22: CoV2E => gC1qR; k_CoV2E_catgC1qR*gC1qR*CoV2E*Plasma;
    k_CoV2E_catgC1qR = 2400000000 MWDERIVEDUNIT_1__molarity_second;
  r19: CoV2N => gC1qR; k_CoV2N_catgC1qR*gC1qR*CoV2N*Plasma;
    k_CoV2N_catgC1qR = 170000 MWDERIVEDUNIT_1__molarity_second;
  r20: CoV2S => gC1qR; k_CoV2S_catgC1qR*CoV2S*gC1qR*Plasma;
    k_CoV2S_catgC1qR = 11000000000 MWDERIVEDUNIT_1__molarity_second;
  r21: CoV2M => gC1qR; k_CoV2M_catgC1qR*gC1qR*CoV2M*Plasma;
    k_CoV2M_catgC1qR = 2400000000 MWDERIVEDUNIT_1__molarity_second;
  r171: KAL => HK; k_KAL_catHK*KAL*HK*Plasma;
    k_KAL_catHK = 83000000 MWDERIVEDUNIT_1__molarity_second;
  r176: F12 => F12a; (k__CoV2SF12*F12*CoV2S + k__CoV2NF12*F12*CoV2N + k__CoV2MF12*F12*CoV2M + k__CoV2EF12*F12*CoV2E + k_Pn_catF12*Pn*F12)*Plasma;
    k__CoV2SF12 = 1000000 MWDERIVEDUNIT_1__molarity_second; k__CoV2NF12 = 10000 MWDERIVEDUNIT_1__molarity_second; k__CoV2MF12 = 10000 MWDERIVEDUNIT_1__molarity_second; k__CoV2EF12 = 10000 MWDERIVEDUNIT_1__molarity_second; k_Pn_catF12 = 1000 MWDERIVEDUNIT_1__molarity_second;
  r163: CoV2M => HK; k__CoV2MHK*HK*CoV2M*Plasma;
    k__CoV2MHK = 1000 MWDERIVEDUNIT_1__molarity_second;
  r164: CoV2E => HK; k__CoV2EHK*HK*CoV2E*Plasma;
    k__CoV2EHK = 1000 MWDERIVEDUNIT_1__molarity_second;
  r162: CoV2N => HK; k__CoV2NHK*HK*CoV2N*Plasma;
    k__CoV2NHK = 1000 MWDERIVEDUNIT_1__molarity_second;
  r161: CoV2S => HK; k__CoV2SHK*HK*CoV2S*Plasma;
    k__CoV2SHK = 1000 MWDERIVEDUNIT_1__molarity_second;
  r168: P_KAL => KAL; k__KALPKAL*P_KAL*KAL*Plasma;
    k__KALPKAL = 27000 MWDERIVEDUNIT_1__molarity_second;
  r231: P_KAL_HK => BK; k_PKALHK_catBK*P_KAL_HK*Plasma;
    k_PKALHK_catBK = 0.1 MWDERIVEDUNIT_1__second;
  r233: BK_B2R => IL6; k_BKB2R_catIL6*BK_B2R*Plasma;
    k_BKB2R_catIL6 = 0.1 MWDERIVEDUNIT_1__second;
  r246: TAFIa + C3a => ; k__C3aTAFIa*TAFIa*C3a*Plasma;
    k__C3aTAFIa = 236000 MWDERIVEDUNIT_1__molarity_second;
  r247: TAFI => TAFIa; (k_F2a_catTAFI*TAFI*F2a/(k_F2a_mTAFI + TAFI) + k_Pn_catTAFI*TAFI*Pn/(k_Pn_mTAFI + TAFI) + k_MASP1_catTAFI*TAFI*MASP1/(k_MASP1_mTAFI + TAFI))*Plasma;
    k_F2a_catTAFI = 0.17 MWDERIVEDUNIT_1__second; k_Pn_catTAFI = 0.0004 MWDERIVEDUNIT_1__second; k_MASP1_catTAFI = 0.1 MWDERIVEDUNIT_1__second; k_F2a_mTAFI = 8.3e-7 MWBUILTINUNIT_molarity; k_Pn_mTAFI = 5.5e-8 MWBUILTINUNIT_molarity; k_MASP1_mTAFI = 3.9e-8 MWBUILTINUNIT_molarity;
  r271: TAFIa + C5a => ; k__C5aTAFIa*TAFIa*C5a*Plasma;
    k__C5aTAFIa = 135000 MWDERIVEDUNIT_1__molarity_second;
  r256: Glu_Pg => Pn; (k_KAL_catGlu_Pg*Glu_Pg*KAL/(k_KAL_mGlu_Pg + Glu_Pg) + k_tPA_catGlu_Pg*Glu_Pg*tPA/(k_tPA_mGlu_Pg + Glu_Pg))*Plasma;
    k_KAL_catGlu_Pg = 0.00016 MWDERIVEDUNIT_1__second; k_KAL_mGlu_Pg = 5.6e-7 MWBUILTINUNIT_molarity; k_tPA_catGlu_Pg = 4.1e-7 MWDERIVEDUNIT_1__second; k_tPA_mGlu_Pg = 0.073 MWBUILTINUNIT_molarity;
  r261: Pn => Lys_Pg; k_Pn_catLys_Pg*Pn*Plasma;
    k_Pn_catLys_Pg = 0.1 MWDERIVEDUNIT_1__second;
  r254: tPA => Glu_Pg; r254_k_F1a_cattPA*tPA*F1a/(r254_k_F1a_mtPA + tPA)*Plasma;
    r254_k_F1a_cattPA = 4.1e-7 MWDERIVEDUNIT_1__second; r254_k_F1a_mtPA = 0.073 MWBUILTINUNIT_molarity;
  r248: BK_B2R => tPA; k_BKB2R_cattPA*BK_B2R*Plasma;
    k_BKB2R_cattPA = 0.1 MWDERIVEDUNIT_1__second;
  r160: CD59 + C5b_C6_C7_C8_C9 => ; k__CD59MAC*CD59*C5b_C6_C7_C8_C9*Plasma;
    k__CD59MAC = 1000000 MWDERIVEDUNIT_1__molarity_second;
  r183: F12a + P_KAL -> P_KAL_F12a; k__PKALF12a_1*F12a*P_KAL*Plasma - k__PKALF12a_2*P_KAL_F12a*Plasma;
    k__PKALF12a_1 = 100000000 MWDERIVEDUNIT_1__molarity_second; k__PKALF12a_2 = 3600 MWDERIVEDUNIT_1__second;
  r184: P_KAL_F12a => ; r184_k_F12a_catKAL*P_KAL_F12a*Plasma;
    r184_k_F12a_catKAL = 40 MWDERIVEDUNIT_1__second;
  r170: => KAL; r170_k_F12a_catKAL*P_KAL_F12a*Plasma;
    r170_k_F12a_catKAL = 40 MWDERIVEDUNIT_1__second;
  r250: PAI_1 + tPA => ; k__tPAPAI_1*PAI_1*tPA*Plasma;
    k__tPAPAI_1 = 20000000 MWDERIVEDUNIT_1__molarity_second;
  r252: tPA => Lys_Pg; r252_k_F1a_cattPA*tPA*F1a/(r252_k_F1a_mtPA + tPA)*Plasma;
    r252_k_F1a_cattPA = 2e-8 MWDERIVEDUNIT_1__second; r252_k_F1a_mtPA = 0.064 MWBUILTINUNIT_molarity;
  r253: TAFIa + Lys_Pg => ; k__Lys_PgTAFIa*TAFIa*Lys_Pg*Plasma;
    k__Lys_PgTAFIa = 10510000 MWDERIVEDUNIT_1__molarity_second;
  r249: F1a_Lys_Pg => tPA; r249_k_F1a_cattPA*F1a_Lys_Pg*Plasma;
    r249_k_F1a_cattPA = 0.1 MWDERIVEDUNIT_1__second;
  r244: F1a + Lys_Pg -> F1a_Lys_Pg; k__F1aLys_Pg_1*F1a*Lys_Pg*Plasma - k__F1aLys_Pg_2*F1a_Lys_Pg*Plasma;
    k__F1aLys_Pg_1 = 1e-7 MWDERIVEDUNIT_1__molarity_second; k__F1aLys_Pg_2 = 3.8 MWDERIVEDUNIT_1__second;
  r232: B2R + BK -> BK_B2R; k__BKB2R_1*B2R*BK*Plasma - k__BKB2R_2*BK_B2R*Plasma;
    k__BKB2R_1 = 340000000 MWDERIVEDUNIT_1__molarity_second; k__BKB2R_2 = 1 MWDERIVEDUNIT_1__second;
  r178: HK + P_KAL -> P_KAL_HK; (k__PKALHK_1*HK*P_KAL - k__PKALHK_2*P_KAL_HK)*Plasma;
    k__PKALHK_1 = 83000000 MWDERIVEDUNIT_1__molarity_second; k__PKALHK_2 = 1 MWDERIVEDUNIT_1__second;
  r173: gC1qR + F12 -> gC1qR_F12; k__gC1qRF12_1*gC1qR*F12*Plasma - k__gC1qRF12_2*gC1qR_F12*Plasma;
    k__gC1qRF12_1 = 83000000000000 MWDERIVEDUNIT_1__molarity_second; k__gC1qRF12_2 = 0.1 MWDERIVEDUNIT_1__second;
  r174: gC1qR_F12 => F12a; k_gC1qRF12_catF12a*gC1qR_F12*Plasma;
    k_gC1qRF12_catF12a = 0.1 MWDERIVEDUNIT_1__second;
  r7: C1INH + C1q => ; k__C1INHC1q*C1INH*C1q*Plasma;
    k__C1INHC1q = 95000 MWDERIVEDUNIT_1__molarity_second;
  r32: FB => ; k__dFB*FB*Plasma;
    k__dFB = 5.5e-6 MWDERIVEDUNIT_1__second;
  r187: HK + F11 -> HK_F11; k__HKF11_1*HK*F11*Plasma - k__HKF11_2*HK_F11*Plasma;
    k__HKF11_1 = 4000000 MWDERIVEDUNIT_1__molarity_second; k__HKF11_2 = 1 MWDERIVEDUNIT_1__second;
  r188: HK_F11 => F11a; k_HKF11_catF11a*HK_F11*Plasma;
    k_HKF11_catF11a = 0.1 MWDERIVEDUNIT_1__second;
  r28: C3W_Bb => Bb; r28_k__C3WBb*C3W_Bb*Plasma;
    r28_k__C3WBb = 0.009 MWDERIVEDUNIT_1__second;
  r47: => FD; k__sFD*Plasma;
    k__sFD = 1.3e-11 MWDERIVEDUNIT_molarity__second;
  r142: C5 => ; k__dC5*C5*Plasma;
    k__dC5 = 5.6e-6 MWDERIVEDUNIT_1__second;
  r141: => C5; k__sC5*Plasma;
    k__sC5 = 2.2e-12 MWDERIVEDUNIT_molarity__second;
  r150: C6 => ; k__dC6*C6*Plasma;
    k__dC6 = 0.00029 MWDERIVEDUNIT_1__second;
  r149: => C6; k__sC6*Plasma;
    k__sC6 = 1.8e-10 MWDERIVEDUNIT_molarity__second;
  r152: => C7; k__sC7*Plasma;
    k__sC7 = 1.9e-12 MWDERIVEDUNIT_molarity__second;
  r153: C7 => ; k__dC7*C7*Plasma;
    k__dC7 = 3.2e-6 MWDERIVEDUNIT_1__second;
  r156: C8 => ; k__dC8*C8*Plasma;
    k__dC8 = 4.01e-6 MWDERIVEDUNIT_1__second;
  r155: => C8; k__sC8*Plasma;
    k__sC8 = 1.4e-12 MWDERIVEDUNIT_molarity__second;
  r159: C9 => ; k__dC9*C9*Plasma;
    k__dC9 = 4.01e-6 MWDERIVEDUNIT_1__second;
  r158: => C9; k__sC9*Plasma;
    k__sC9 = 3.4e-12 MWDERIVEDUNIT_molarity__second;
  r44: Ba => ; k__dBa*Ba*Plasma;
    k__dBa = 7.7e-5 MWDERIVEDUNIT_1__second;
  r30: Bb => ; k__dBb*Bb*Plasma;
    k__dBb = 7.7e-5 MWDERIVEDUNIT_1__second;
  r25: C3W => ; k__dC3W*C3W*Plasma;
    k__dC3W = 4.01e-6 MWDERIVEDUNIT_1__second;
  r27: C3W_FB => ; k__dC3WFB*C3W_FB*Plasma;
    k__dC3WFB = 4.01e-6 MWDERIVEDUNIT_1__second;
  r62: C3W_Bb => ; r62_k__C3WBb*C3W_Bb*Plasma;
    r62_k__C3WBb = 4.01e-6 MWDERIVEDUNIT_1__second;
  r45: fC3b_FB => ; k__dfC3bFB*fC3b_FB*Plasma;
    k__dfC3bFB = 4.01e-6 MWDERIVEDUNIT_1__second;
  r95: fC3b_Bb => ; k__dfC3bBb*fC3b_Bb*Plasma;
    k__dfC3bBb = 4.01e-6 MWDERIVEDUNIT_1__second;
  r72: fC3b => ; k__dfC3b*fC3b*Plasma;
    k__dfC3b = 4.01e-6 MWDERIVEDUNIT_1__second;
  r147: C5b => ; k__dC5b*C5b*Plasma;
    k__dC5b = 0.005 MWDERIVEDUNIT_1__second;
  r143: C5a => ; k__dC5a*C5a*Plasma;
    k__dC5a = 0.0115 MWDERIVEDUNIT_1__second;
  r137: C3a => ; k__dC3a*C3a*Plasma;
    k__dC3a = 0.0115 MWDERIVEDUNIT_1__second;
  r125: C3b => ; k__dC3b*C3b*Plasma;
    k__dC3b = 4.01e-6 MWDERIVEDUNIT_1__second;
  r48: FD => ; k__dFD*FD*Plasma;
    k__dFD = 0.00022 MWDERIVEDUNIT_1__second;
  r166: HK + gC1qR -> gC1qR_HK; k__gC1qRHK_1*HK*gC1qR*Plasma - k__gC1qRHK_2*gC1qR_HK*Plasma;
    k__gC1qRHK_1 = 530000000000 MWDERIVEDUNIT_1__molarity_second; k__gC1qRHK_2 = 0.1 MWDERIVEDUNIT_1__second;
  r167: gC1qR_HK => BK; k_gC1qRHK_catBK*gC1qR_HK*Plasma;
    k_gC1qRHK_catBK = 0.1 MWDERIVEDUNIT_1__second;
  r46: PFD => FD; (k_MASP1_catPFD*PFD*MASP1 + k_MASP2_catPFD*PFD*MASP2 + k_F2a_catPFD*PFD*F2a)*Plasma;
    k_MASP1_catPFD = 3900 MWDERIVEDUNIT_1__molarity_second; k_MASP2_catPFD = 7200 MWDERIVEDUNIT_1__molarity_second; k_F2a_catPFD = 460 MWDERIVEDUNIT_1__molarity_second;
  r245: TAFIa + BK => ; k__BKTAFIa*TAFIa*BK*Plasma;
    k__BKTAFIa = 280000 MWDERIVEDUNIT_1__molarity_second;
  r259: Glu_Pg + FDPs -> Glu_Pg_FDPs; k__Glu_PgFDPs_1*Glu_Pg*FDPs*Plasma - k__Glu_PgFDPs_2*Glu_Pg_FDPs*Plasma;
    k__Glu_PgFDPs_1 = 571000 MWDERIVEDUNIT_1__molarity_second; k__Glu_PgFDPs_2 = 0.1 MWDERIVEDUNIT_1__second;
  r273: Glu_Pg_FDPs + TAFIa => ; k__Glu_PgFPDsTAFIa*Glu_Pg_FDPs*TAFIa*Plasma;
    k__Glu_PgFPDsTAFIa = 17133000 MWDERIVEDUNIT_1__molarity_second;
  r260: Lys_Pg + FDPs -> Lys_Pg_FDPs; k__Lys_PgFDPs_1*Lys_Pg*FDPs*Plasma - k__Lys_PgFDPs_2*Lys_Pg_FDPs*Plasma;
    k__Lys_PgFDPs_1 = 1110000 MWDERIVEDUNIT_1__molarity_second; k__Lys_PgFDPs_2 = 0.1 MWDERIVEDUNIT_1__second;
  r272: Lys_Pg_FDPs + TAFIa => ; k__Lys_PgFDPsTAFIa*Lys_Pg_FDPs*TAFIa*Plasma;
    k__Lys_PgFDPsTAFIa = 10510000 MWDERIVEDUNIT_1__molarity_second;
  r258: F1a => FDPs; k_Pn_catF1a*F1a*Pn/(k_Pn_mF1a + F1a)*Plasma;
    k_Pn_catF1a = 6.4 MWDERIVEDUNIT_1__second; k_Pn_mF1a = 1.4e-7 MWBUILTINUNIT_molarity;
  r257: TAFIa + Glu_Pg => ; k__Glu_PgTAFIa*TAFIa*Glu_Pg*Plasma;
    k__Glu_PgTAFIa = 16900000 MWDERIVEDUNIT_1__molarity_second;
  r255: Glu_Pg => Lys_Pg; k_Pn_catGlu_Pg*Glu_Pg*Pn/(k_Pn_mGlu_Pg + Glu_Pg)*Plasma;
    k_Pn_catGlu_Pg = 0.1 MWDERIVEDUNIT_1__second; k_Pn_mGlu_Pg = 0.0001 MWBUILTINUNIT_molarity;
  r71: IL6 => ; k__dIL6*IL6*Plasma;
    k__dIL6 = 0.01 MWDERIVEDUNIT_1__second;

  // Unit definitions:
  unit MWBUILTINUNIT_liter = metre^3 * 1e-3 dimensionless;
  unit MWBUILTINUNIT_molarity = mole * 1000 dimensionless / metre^3;
  unit MWDERIVEDUNIT_molarity_liter = mole; MWDERIVEDUNIT_molarity_liter is "(molarity)*(liter)";
  unit MWDERIVEDUNIT_1__molarity_second = metre^3 * 1e-3 dimensionless / (mole * second); MWDERIVEDUNIT_1__molarity_second is "1/(molarity*second)";
  unit MWDERIVEDUNIT_1__second = dimensionless / second; MWDERIVEDUNIT_1__second is "1/second";
  unit MWDERIVEDUNIT_molarity__second = mole * 1000 dimensionless / (metre^3 * second); MWDERIVEDUNIT_molarity__second is "molarity/second";
end
